# OpenSim document version 30000
Model XSensStyleModel:
  length_units: meters
  force_units: N
  gravity: 0 0 -9.80665
  BodySet:
    Body ground: mass=0 mass_center=(0 0 0) inertia_xx=0 inertia_yy=0 inertia_zz=0
    Body leftFoot: mass=FOOTMASS mass_center=(0 0 0) inertia_xx=FOOTINERTIAIXX inertia_yy=FOOTINERTIAIYY
        inertia_zz=FOOTINERTIAIZZ meshes=box.vtp
      CustomJoint jGround_leftFoot: parent_body=ground location_in_parent=(0 0 0) location=(0 0 -FOOTHALFBETA)
        Coordinate jLeftFoot_tilt: motion_type=rotational default_value=0 initial_value=0 range=(-1.570796 1.570796)
            clamped=true
        Coordinate jLeftFoot_list: motion_type=rotational default_value=0 initial_value=0 range=(-1.570796 1.570796)
            clamped=true
        Coordinate jLeftFoot_rotation: motion_type=rotational default_value=0 initial_value=0
            range=(-1.570796 1.570796) clamped=true
        Coordinate jLeftFoot_tx: motion_type=translational default_value=0 initial_value=0 range=(-5 5) clamped=true
        Coordinate jLeftFoot_ty: motion_type=translational default_value=0 initial_value=0 range=(-1 2) clamped=true
        Coordinate jLeftFoot_tz: motion_type=translational default_value=0 initial_value=0 range=(-3 3) clamped=true
        SpatialTransform:
          TransformAxis rotation1: coordinates=jLeftFoot_tilt axis=(0 0 1) LinearFunction(coefficients=1 0)
          TransformAxis rotation2: coordinates=jLeftFoot_list axis=(1 0 0) LinearFunction(coefficients=1 0)
          TransformAxis rotation3: coordinates=jLeftFoot_rotation axis=(0 1 0) LinearFunction(coefficients=1 0)
          TransformAxis translation1: coordinates=jLeftFoot_tx axis=(1 0 0) LinearFunction(coefficients=1 0)
          TransformAxis translation2: coordinates=jLeftFoot_ty axis=(0 1 0) LinearFunction(coefficients=1 0)
          TransformAxis translation3: coordinates=jLeftFoot_tz axis=(0 0 1) LinearFunction(coefficients=1 0)
    Body leftToe: mass=TOEMASS mass_center=(0 0 0) inertia_xx=TOEINERTIAIXX inertia_yy=TOEINERTIAIYY
        inertia_zz=TOEINERTIAIZZ meshes=box.vtp
      BallJoint jLeftBallFoot: parent_body=leftFoot location_in_parent=(FOOTHALFGAMMA 0 0) location=(-TOEHALFGAMMA 0 0)
        Coordinate jLeftBallFoot_angle1: motion_type=rotational default_value=0 range=(-1.570796 1.570796)
            clamped=false
        Coordinate jLeftBallFoot_angle2: motion_type=rotational default_value=0 range=(-1.570796 1.570796)
            clamped=false
        Coordinate jLeftBallFoot_angle3: motion_type=rotational default_value=0 range=(-1.570796 1.570796)
            clamped=false
    Body leftLowerLeg: mass=LOWERLEGMASS mass_center=(0 0 0) inertia_xx=LOWERLEGINERTIAIXX
        inertia_yy=LOWERLEGINERTIAIYY inertia_zz=LOWERLEGINERTIAIZZ meshes=cylinder.vtp
      BallJoint jLeftAnkle: parent_body=leftFoot location_in_parent=(-ANKLEPOSX 0 FOOTHALFBETA)
          location=(0 0 -LOWERLEGHALFHEIGHT)
        Coordinate jLeftAnkle_angle1: motion_type=rotational default_value=0 range=(-1.570796 1.570796) clamped=false
        Coordinate jLeftAnkle_angle2: motion_type=rotational default_value=0 range=(-1.570796 1.570796) clamped=false
        Coordinate jLeftAnkle_angle3: motion_type=rotational default_value=0 range=(-1.570796 1.570796) clamped=false
    Body leftUpperLeg: mass=UPPERLEGMASS mass_center=(0 0 0) inertia_xx=UPPERLEGINERTIAIXX
        inertia_yy=UPPERLEGINERTIAIYY inertia_zz=UPPERLEGINERTIAIZZ meshes=cylinder.vtp
      BallJoint jLeftKnee: parent_body=leftLowerLeg location_in_parent=(0 0 LOWERLEGHALFHEIGHT)
          location=(0 0 -UPPERLEGHALFHEIGHT)
        Coordinate jLeftKnee_angle1: motion_type=rotational default_value=0 range=(-1.570796 1.570796) clamped=false
        Coordinate jLeftKnee_angle2: motion_type=rotational default_value=0 range=(-1.570796 1.570796) clamped=false
        Coordinate jLeftKnee_angle3: motion_type=rotational default_value=0 range=(-1.570796 1.570796) clamped=false
    Body pelvis: mass=PELVISMASS mass_center=(0 0 0) inertia_xx=PELVISINERTIAIXX inertia_yy=PELVISINERTIAIYY
        inertia_zz=PELVISINERTIAIZZ meshes=box.vtp
      BallJoint jLeftHip: parent_body=leftUpperLeg location_in_parent=(0 0 UPPERLEGHALFHEIGHT)
          location=(0 HIPPOSY -PELVISHALFBETA)
        Coordinate jLeftHip_angle1: motion_type=rotational default_value=0 range=(-1.570796 1.570796) clamped=false
        Coordinate jLeftHip_angle2: motion_type=rotational default_value=0 range=(-1.570796 1.570796) clamped=false
        Coordinate jLeftHip_angle3: motion_type=rotational default_value=0 range=(-1.570796 1.570796) clamped=false
    Body l5: mass=L5MASS mass_center=(0 0 0) inertia_xx=L5INERTIAIXX inertia_yy=L5INERTIAIYY inertia_zz=L5INERTIAIZZ
        meshes=cylinder.vtp
      BallJoint jL5S1: parent_body=pelvis location_in_parent=(0 0 PELVISHALFBETA) location=(0 0 -L5HALFHEIGHT)
        Coordinate jL5S1_angle1: motion_type=rotational default_value=0 range=(-1.570796 1.570796) clamped=false
        Coordinate jL5S1_angle2: motion_type=rotational default_value=0 range=(-1.570796 1.570796) clamped=false
        Coordinate jL5S1_angle3: motion_type=rotational default_value=0 range=(-1.570796 1.570796) clamped=false
    Body l3: mass=L3MASS mass_center=(0 0 0) inertia_xx=L3INERTIAIXX inertia_yy=L3INERTIAIYY inertia_zz=L3INERTIAIZZ
        meshes=cylinder.vtp
      BallJoint jL4L3: parent_body=l5 location_in_parent=(0 0 L5HALFHEIGHT) location=(0 0 -L3HALFHEIGHT)
        Coordinate jL4L3_angle1: motion_type=rotational default_value=0 range=(-1.570796 1.570796) clamped=false
        Coordinate jL4L3_angle2: motion_type=rotational default_value=0 range=(-1.570796 1.570796) clamped=false
        Coordinate jL4L3_angle3: motion_type=rotational default_value=0 range=(-1.570796 1.570796) clamped=false
    Body t12: mass=T12MASS mass_center=(0 0 0) inertia_xx=T12INERTIAIXX inertia_yy=T12INERTIAIYY
        inertia_zz=T12INERTIAIZZ meshes=cylinder.vtp
      BallJoint jL1T12: parent_body=l3 location_in_parent=(0 0 L3HALFHEIGHT) location=(0 0 -T12HALFHEIGHT)
        Coordinate jL1T12_angle1: motion_type=rotational default_value=0 range=(-1.570796 1.570796) clamped=false
        Coordinate jL1T12_angle2: motion_type=rotational default_value=0 range=(-1.570796 1.570796) clamped=false
        Coordinate jL1T12_angle3: motion_type=rotational default_value=0 range=(-1.570796 1.570796) clamped=false
    Body t8: mass=T8MASS mass_center=(0 0 0) inertia_xx=T8INERTIAIXX inertia_yy=T8INERTIAIYY inertia_zz=T8INERTIAIZZ
        meshes=box.vtp
      BallJoint jT9T8: parent_body=t12 location_in_parent=(0 0 T12HALFHEIGHT) location=(0 0 -T8HALFBETA)
        Coordinate jT9T8_angle1: motion_type=rotational default_value=0 range=(-1.570796 1.570796) clamped=false
        Coordinate jT9T8_angle2: motion_type=rotational default_value=0 range=(-1.570796 1.570796) clamped=false
        Coordinate jT9T8_angle3: motion_type=rotational default_value=0 range=(-1.570796 1.570796) clamped=false
    Body neck: mass=NECKMASS mass_center=(0 0 0) inertia_xx=NECKINERTIAIXX inertia_yy=NECKINERTIAIYY
        inertia_zz=NECKINERTIAIZZ meshes=cylinder.vtp
      BallJoint jT1C7: parent_body=t8 location_in_parent=(0 0 T8HALFBETA) location=(0 0 -NECKHALFHEIGHT)
        Coordinate jT1C7_angle1: motion_type=rotational default_value=0 range=(-1.570796 1.570796) clamped=false
        Coordinate jT1C7_angle2: motion_type=rotational default_value=0 range=(-1.570796 1.570796) clamped=false
        Coordinate jT1C7_angle3: motion_type=rotational default_value=0 range=(-1.570796 1.570796) clamped=false
    Body head: mass=HEADMASS mass_center=(0 0 0) inertia_xx=HEADINERTIAIXX inertia_yy=HEADINERTIAIYY
        inertia_zz=HEADINERTIAIZZ meshes=sphere.vtp
      BallJoint jC1Head: parent_body=neck location_in_parent=(0 0 NECKHALFHEIGHT) location=(0 0 -HEADRADIUS)
        Coordinate jC1Head_angle1: motion_type=rotational default_value=0 range=(-1.570796 1.570796) clamped=false
        Coordinate jC1Head_angle2: motion_type=rotational default_value=0 range=(-1.570796 1.570796) clamped=false
        Coordinate jC1Head_angle3: motion_type=rotational default_value=0 range=(-1.570796 1.570796) clamped=false
    Body rightUpperLeg: mass=UPPERLEGMASS mass_center=(0 0 0) inertia_xx=UPPERLEGINERTIAIXX
        inertia_yy=UPPERLEGINERTIAIYY inertia_zz=UPPERLEGINERTIAIZZ meshes=cylinder.vtp
      BallJoint jRightHip: parent_body=pelvis location_in_parent=(0 -HIPPOSY -PELVISHALFBETA)
          location=(0 0 UPPERLEGHALFHEIGHT)
        Coordinate jRightHip_angle1: motion_type=rotational default_value=0 range=(-1.570796 1.570796) clamped=false
        Coordinate jRightHip_angle2: motion_type=rotational default_value=0 range=(-1.570796 1.570796) clamped=false
        Coordinate jRightHip_angle3: motion_type=rotational default_value=0 range=(-1.570796 1.570796) clamped=false
    Body rightLowerLeg: mass=LOWERLEGMASS mass_center=(0 0 0) inertia_xx=LOWERLEGINERTIAIXX
        inertia_yy=LOWERLEGINERTIAIYY inertia_zz=LOWERLEGINERTIAIZZ meshes=cylinder.vtp
      BallJoint jRightKnee: parent_body=rightUpperLeg location_in_parent=(0 0 -UPPERLEGHALFHEIGHT)
          location=(0 0 LOWERLEGHALFHEIGHT)
        Coordinate jRightKnee_angle1: motion_type=rotational default_value=0 range=(-1.570796 1.570796) clamped=false
        Coordinate jRightKnee_angle2: motion_type=rotational default_value=0 range=(-1.570796 1.570796) clamped=false
        Coordinate jRightKnee_angle3: motion_type=rotational default_value=0 range=(-1.570796 1.570796) clamped=false
    Body rightFoot: mass=FOOTMASS mass_center=(0 0 0) inertia_xx=FOOTINERTIAIXX inertia_yy=FOOTINERTIAIYY
        inertia_zz=FOOTINERTIAIZZ meshes=box.vtp
      BallJoint jRightAnkle: parent_body=rightLowerLeg location_in_parent=(0 0 -LOWERLEGHALFHEIGHT)
          location=(-ANKLEPOSX 0 FOOTHALFBETA)
        Coordinate jRightAnkle_angle1: motion_type=rotational default_value=0 range=(-1.570796 1.570796) clamped=false
        Coordinate jRightAnkle_angle2: motion_type=rotational default_value=0 range=(-1.570796 1.570796) clamped=false
        Coordinate jRightAnkle_angle3: motion_type=rotational default_value=0 range=(-1.570796 1.570796) clamped=false
    Body rightToe: mass=TOEMASS mass_center=(0 0 0) inertia_xx=TOEINERTIAIXX inertia_yy=TOEINERTIAIYY
        inertia_zz=TOEINERTIAIZZ meshes=box.vtp
      BallJoint jRightBallFoot: parent_body=rightFoot location_in_parent=(FOOTHALFGAMMA 0 0)
          location=(-TOEHALFGAMMA 0 0)
        Coordinate jRightBallFoot_angle1: motion_type=rotational default_value=0 range=(-1.570796 1.570796)
            clamped=false
        Coordinate jRightBallFoot_angle2: motion_type=rotational default_value=0 range=(-1.570796 1.570796)
            clamped=false
        Coordinate jRightBallFoot_angle3: motion_type=rotational default_value=0 range=(-1.570796 1.570796)
            clamped=false
    Body leftShoulder: mass=SHOULDERMASS mass_center=(0 0 0) inertia_xx=SHOULDERINERTIAIXX
        inertia_yy=SHOULDERINERTIAIYY inertia_zz=SHOULDERINERTIAIZZ meshes=cylinder.vtp
      BallJoint jLeftC7Shoulder: parent_body=t8 location_in_parent=(0 T8HALFALFA SHOULDERPOSZ)
          location=(0 -SHOULDERHALFHEIGHT 0)
        Coordinate jLeftC7Shoulder_angle1: motion_type=rotational default_value=0 range=(-1.570796 1.570796)
            clamped=false
        Coordinate jLeftC7Shoulder_angle2: motion_type=rotational default_value=0 range=(-1.570796 1.570796)
            clamped=false
        Coordinate jLeftC7Shoulder_angle3: motion_type=rotational default_value=0 range=(-1.570796 1.570796)
            clamped=false
    Body leftUpperArm: mass=UPPERARMMASS mass_center=(0 0 0) inertia_xx=UPPERARMINERTIAIXX
        inertia_yy=UPPERARMINERTIAIYY inertia_zz=UPPERARMINERTIAIZZ meshes=cylinder.vtp
      BallJoint jLeftShoulder: parent_body=leftShoulder location_in_parent=(0 SHOULDERHALFHEIGHT 0)
          location=(0 -UPPERARMRADIUS ARMPOSZ)
        Coordinate jLeftShoulder_angle1: motion_type=rotational default_value=0 range=(-1.570796 1.570796)
            clamped=false
        Coordinate jLeftShoulder_angle2: motion_type=rotational default_value=0 range=(-1.570796 1.570796)
            clamped=false
        Coordinate jLeftShoulder_angle3: motion_type=rotational default_value=0 range=(-1.570796 1.570796)
            clamped=false
    Body leftForeArm: mass=FOREARMMASS mass_center=(0 0 0) inertia_xx=FOREARMINERTIAIXX inertia_yy=FOREARMINERTIAIYY
        inertia_zz=FOREARMINERTIAIZZ meshes=cylinder.vtp
      BallJoint jLeftElbow: parent_body=leftUpperArm location_in_parent=(0 0 -UPPERARMHALFHEIGHT)
          location=(0 0 FOREARMHALFHEIGHT)
        Coordinate jLeftElbow_angle1: motion_type=rotational default_value=0 range=(-1.570796 1.570796) clamped=false
        Coordinate jLeftElbow_angle2: motion_type=rotational default_value=0 range=(-1.570796 1.570796) clamped=false
        Coordinate jLeftElbow_angle3: motion_type=rotational default_value=0 range=(-1.570796 1.570796) clamped=false
    Body leftHand: mass=HANDMASS mass_center=(0 0 0) inertia_xx=HANDINERTIAIXX inertia_yy=HANDINERTIAIYY
        inertia_zz=HANDINERTIAIZZ meshes=box.vtp
      BallJoint jLeftWrist: parent_body=leftForeArm location_in_parent=(0 0 -FOREARMHALFHEIGHT)
          location=(0 0 HANDHALFBETA)
        Coordinate jLeftWrist_angle1: motion_type=rotational default_value=0 range=(-1.570796 1.570796) clamped=false
        Coordinate jLeftWrist_angle2: motion_type=rotational default_value=0 range=(-1.570796 1.570796) clamped=false
        Coordinate jLeftWrist_angle3: motion_type=rotational default_value=0 range=(-1.570796 1.570796) clamped=false
    Body rightShoulder: mass=SHOULDERMASS mass_center=(0 0 0) inertia_xx=SHOULDERINERTIAIXX
        inertia_yy=SHOULDERINERTIAIYY inertia_zz=SHOULDERINERTIAIZZ meshes=cylinder.vtp
      BallJoint jRightC7Shoulder: parent_body=t8 location_in_parent=(0 -T8HALFALFA SHOULDERPOSZ)
          location=(0 SHOULDERHALFHEIGHT 0)
        Coordinate jRightC7Shoulder_angle1: motion_type=rotational default_value=0 range=(-1.570796 1.570796)
            clamped=false
        Coordinate jRightC7Shoulder_angle2: motion_type=rotational default_value=0 range=(-1.570796 1.570796)
            clamped=false
        Coordinate jRightC7Shoulder_angle3: motion_type=rotational default_value=0 range=(-1.570796 1.570796)
            clamped=false
    Body rightUpperArm: mass=UPPERARMMASS mass_center=(0 0 0) inertia_xx=UPPERARMINERTIAIXX
        inertia_yy=UPPERARMINERTIAIYY inertia_zz=UPPERARMINERTIAIZZ meshes=cylinder.vtp
      BallJoint jRightShoulder: parent_body=rightShoulder location_in_parent=(0 -SHOULDERHALFHEIGHT 0)
          location=(0 UPPERARMRADIUS ARMPOSZ)
        Coordinate jRightShoulder_angle1: motion_type=rotational default_value=0 range=(-1.570796 1.570796)
            clamped=false
        Coordinate jRightShoulder_angle2: motion_type=rotational default_value=0 range=(-1.570796 1.570796)
            clamped=false
        Coordinate jRightShoulder_angle3: motion_type=rotational default_value=0 range=(-1.570796 1.570796)
            clamped=false
    Body rightForeArm: mass=FOREARMMASS mass_center=(0 0 0) inertia_xx=FOREARMINERTIAIXX inertia_yy=FOREARMINERTIAIYY
        inertia_zz=FOREARMINERTIAIZZ meshes=cylinder.vtp
      BallJoint jRightElbow: parent_body=rightUpperArm location_in_parent=(0 0 -UPPERARMHALFHEIGHT)
          location=(0 0 FOREARMHALFHEIGHT)
        Coordinate jRightElbow_angle1: motion_type=rotational default_value=0 range=(-1.570796 1.570796) clamped=false
        Coordinate jRightElbow_angle2: motion_type=rotational default_value=0 range=(-1.570796 1.570796) clamped=false
        Coordinate jRightElbow_angle3: motion_type=rotational default_value=0 range=(-1.570796 1.570796) clamped=false
    Body rightHand: mass=HANDMASS mass_center=(0 0 0) inertia_xx=HANDINERTIAIXX inertia_yy=HANDINERTIAIYY
        inertia_zz=HANDINERTIAIZZ meshes=box.vtp
      BallJoint jRightWrist: parent_body=rightForeArm location_in_parent=(0 0 -FOREARMHALFHEIGHT)
          location=(0 0 HANDHALFBETA)
        Coordinate jRightWrist_angle1: motion_type=rotational default_value=0 range=(-1.570796 1.570796) clamped=false
        Coordinate jRightWrist_angle2: motion_type=rotational default_value=0 range=(-1.570796 1.570796) clamped=false
        Coordinate jRightWrist_angle2: motion_type=rotational default_value=0 range=(-1.570796 1.570796) clamped=false
  MarkerSet:
    Marker pHipOrigin: pelvis (PHIPORIGINX PHIPORIGINY PHIPORIGINZ)
    Marker pRightASI: pelvis (PRIGHTASIX PRIGHTASIY PRIGHTASIZ)
    Marker pLeftASI: pelvis (PLEFTASIX PLEFTASIY PLEFTASIZ)
    Marker pRightCSI: pelvis (PRIGHTCSIX PRIGHTCSIY PRIGHTCSIZ)
    Marker pLeftCSI: pelvis (PLEFTCSIX PLEFTCSIY PLEFTCSIZ)
    Marker pRightIschialTub: pelvis (PRIGHTISCHIALTUBX PRIGHTISCHIALTUBY PRIGHTISCHIALTUBZ)
    Marker pLeftIschialTub: pelvis (PLEFTISCHIALTUBX PLEFTISCHIALTUBY PLEFTISCHIALTUBZ)
    Marker pSacrum: pelvis (PSACRUMX PSACRUMY PSACRUMZ)
    Marker pL5SpinalProcess: l5 (PL5SPINALPROCESSX PL5SPINALPROCESSY PL5SPINALPROCESSZ)
    Marker pL3SpinalProcess: l3 (PL3SPINALPROCESSX PL3SPINALPROCESSY PL3SPINALPROCESSZ)
    Marker pT12SpinalProcess: t12 (PT12SPINALPROCESSX PT12SPINALPROCESSY PT12SPINALPROCESSZ)
    Marker pC7SpinalProcess: t8 (PC7SPINALPROCESSX PC7SPINALPROCESSY PC7SPINALPROCESSZ)
    Marker pPX: t8 (PPXX PPXY PPXZ)
    Marker pIJ: t8 (PIJX PIJY PIJZ)
    Marker pT4SpinalProcess: t8 (PT4SPINALPROCESSX PT4SPINALPROCESSY PT4SPINALPROCESSZ)
    Marker pT8SpinalProcess: t8 (PT8SPINALPROCESSX PT8SPINALPROCESSY PT8SPINALPROCESSZ)
    Marker pTopOfHead: head (PTOPOFHEADX PTOPOFHEADY PTOPOFHEADZ)
    Marker pRightAuricularis: head (PRIGHTAURICULARISX PRIGHTAURICULARISY PRIGHTAURICULARISZ)
    Marker pLeftAuricularis: head (PLEFTAURICULARISX PLEFTAURICULARISY PLEFTAURICULARISZ)
    Marker pBackOfHead: head (PBACKOFHEADX PBACKOFHEADY PBACKOFHEADZ)
    Marker pRightAcromion: rightShoulder (PRIGHTACROMIONX PRIGHTACROMIONY PRIGHTACROMIONZ)
    Marker pLeftAcromion: leftShoulder (PLEFTACROMIONX PLEFTACROMIONY PLEFTACROMIONZ)
    Marker pRightArmLatEpicondyle: rightUpperArm
        (PRIGHTARMLATEPICONDYLEX PRIGHTARMLATEPICONDYLEY PRIGHTARMLATEPICONDYLEZ)
    Marker pRightArmMedEpicondyle: rightUpperArm
        (PRIGHTARMMEDEPICONDYLEX PRIGHTARMMEDEPICONDYLEY PRIGHTARMMEDEPICONDYLEZ)
    Marker pLeftArmLatEpicondyle: leftUpperArm (PLEFTARMLATEPICONDYLEX PLEFTARMLATEPICONDYLEY PLEFTARMLATEPICONDYLEZ)
    Marker pLeftArmMedEpicondyle: leftUpperArm (PLEFTARMMEDEPICONDYLEX PLEFTARMMEDEPICONDYLEY PLEFTARMMEDEPICONDYLEZ)
    Marker pRightUlnarStyloid: rightForeArm (PRIGHTULNARSTYLOIDX PRIGHTULNARSTYLOIDY PRIGHTULNARSTYLOIDZ)
    Marker pRightRadialStyloid: rightForeArm (PRIGHTRADIALSTYLOIDX PRIGHTRADIALSTYLOIDY PRIGHTRADIALSTYLOIDZ)
    Marker pRightOlecranon: rightForeArm (PRIGHTOLECRANONX PRIGHTOLECRANONY PRIGHTOLECRANONZ)
    Marker pLeftUlnarStyloid: leftForeArm (PLEFTULNARSTYLOIDX PLEFTULNARSTYLOIDY PLEFTULNARSTYLOIDZ)
    Marker pLeftRadialStyloid: leftForeArm (PLEFTRADIALSTYLOIDX PLEFTRADIALSTYLOIDY PLEFTRADIALSTYLOIDZ)
    Marker pLeftOlecranon: leftForeArm (PLEFTOLECRANONX PLEFTOLECRANONY PLEFTOLECRANONZ)
    Marker pRightTopOfHand: rightHand (PRIGHTTOPOFHANDX PRIGHTTOPOFHANDY PRIGHTTOPOFHANDZ)
    Marker pRightPinky: rightHand (PRIGHTPINKYX PRIGHTPINKYY PRIGHTPINKYZ)
    Marker pRightBallHand: rightHand (PRIGHTBALLHANDX PRIGHTBALLHANDY PRIGHTBALLHANDZ)
    Marker pLeftTopOfHand: leftHand (PLEFTTOPOFHANDX PLEFTTOPOFHANDY PLEFTTOPOFHANDZ)
    Marker pLeftPinky: leftHand (PLEFTPINKYX PLEFTPINKYY PLEFTPINKYZ)
    Marker pLeftBallHand: leftHand (PLEFTBALLHANDX PLEFTBALLHANDY PLEFTBALLHANDZ)
    Marker pRightGreaterTrochanter: rightUpperLeg
        (PRIGHTGREATERTROCHANTERX PRIGHTGREATERTROCHANTERY PRIGHTGREATERTROCHANTERZ)
    Marker pRightPatella: rightUpperLeg (PRIGHTPATELLAX PRIGHTPATELLAY PRIGHTPATELLAZ)
    Marker pRightKneeLatEpicondyle: rightLowerLeg
        (PRIGHTKNEELATEPICONDYLEX PRIGHTKNEELATEPICONDYLEY PRIGHTKNEELATEPICONDYLEZ)
    Marker pRightKneeMedEpicondyle: rightLowerLeg
        (PRIGHTKNEEMEDEPICONDYLEX PRIGHTKNEEMEDEPICONDYLEY PRIGHTKNEEMEDEPICONDYLEZ)
    Marker pRightLatMalleolus: rightLowerLeg (PRIGHTLATMALLEOLUSX PRIGHTLATMALLEOLUSY PRIGHTLATMALLEOLUSZ)
    Marker pRightMedMalleolus: rightLowerLeg (PRIGHTMEDMALLEOLUSX PRIGHTMEDMALLEOLUSY PRIGHTMEDMALLEOLUSZ)
    Marker pRightTibialTub: rightLowerLeg (PRIGHTTIBIALTUBX PRIGHTTIBIALTUBY PRIGHTTIBIALTUBZ)
    Marker pLeftGreaterTrochanter: leftUpperLeg
        (PLEFTGREATERTROCHANTERX PLEFTGREATERTROCHANTERY PLEFTGREATERTROCHANTERZ)
    Marker pLeftPatella: leftUpperLeg (PLEFTPATELLAX PLEFTPATELLAY PLEFTPATELLAZ)
    Marker pLeftKneeLatEpicondyle: leftLowerLeg
        (PLEFTKNEELATEPICONDYLEX PLEFTKNEELATEPICONDYLEY PLEFTKNEELATEPICONDYLEZ)
    Marker pLeftKneeMedEpicondyle: leftLowerLeg
        (PLEFTKNEEMEDEPICONDYLEX PLEFTKNEEMEDEPICONDYLEY PLEFTKNEEMEDEPICONDYLEZ)
    Marker pLeftLatMalleolus: leftLowerLeg (PLEFTLATMALLEOLUSX PLEFTLATMALLEOLUSY PLEFTLATMALLEOLUSZ)
    Marker pLeftMedMalleolus: leftLowerLeg (PLEFTMEDMALLEOLUSX PLEFTMEDMALLEOLUSY PLEFTMEDMALLEOLUSZ)
    Marker pLeftTibialTub: leftLowerLeg (PLEFTTIBIALTUBX PLEFTTIBIALTUBY PLEFTTIBIALTUBZ)
    Marker pRightHeelFoot: rightFoot (PRIGHTHEELFOOTX PRIGHTHEELFOOTY PRIGHTHEELFOOTZ)
    Marker pRightFirstMetatarsal: rightFoot (PRIGHTFIRSTMETATARSALX PRIGHTFIRSTMETATARSALY PRIGHTFIRSTMETATARSALZ)
    Marker pRightFifthMetatarsal: rightFoot (PRIGHTFIFTHMETATARSALX PRIGHTFIFTHMETATARSALY PRIGHTFIFTHMETATARSALZ)
    Marker pRightPivotFoot: rightFoot (PRIGHTPIVOTFOOTX PRIGHTPIVOTFOOTY PRIGHTPIVOTFOOTZ)
    Marker pRightHeelCenter: rightFoot (PRIGHTHEELCENTERX PRIGHTHEELCENTERY PRIGHTHEELCENTERZ)
    Marker pRightToe: rightToe (PRIGHTTOEX PRIGHTTOEY PRIGHTTOEZ)
    Marker pLeftHeelFoot: leftFoot (PLEFTHEELFOOTX PLEFTHEELFOOTY PLEFTHEELFOOTZ)
    Marker pLeftFirstMetatarsal: leftFoot (PLEFTFIRSTMETATARSALX PLEFTFIRSTMETATARSALY PLEFTFIRSTMETATARSALZ)
    Marker pLeftFifthMetatarsal: leftFoot (PLEFTFIFTHMETATARSALX PLEFTFIFTHMETATARSALY PLEFTFIFTHMETATARSALZ)
    Marker pLeftPivotFoot: leftFoot (PLEFTPIVOTFOOTX PLEFTPIVOTFOOTY PLEFTPIVOTFOOTZ)
    Marker pLeftHeelCenter: leftFoot (PLEFTHEELCENTERX PLEFTHEELCENTERY PLEFTHEELCENTERZ)
    Marker pLeftToe: leftToe (PLEFTTOEX PLEFTTOEY PLEFTTOEZ)
