# OpenSim document version 30000
# -------------------OSIM MODEL 66 DoFs---------------------
Model XSensStyleModel:
  length_units: meters
  force_units: N
  gravity: 0 0 -9.80665
  BodySet:
    Body ground: mass=0 mass_center=(0 0 0) inertia_xx=0 inertia_yy=0 inertia_zz=0
    Body Pelvis: mass=PELVISMASS mass_center=PELVIS_COM_ORIGIN inertia_xx=PELVISINERTIAIXX inertia_yy=PELVISINERTIAIYY
        inertia_zz=PELVISINERTIAIZZ meshes=box.vtp
      CustomJoint jGroundBase: parent_body=ground location_in_parent=(0 0 0) location=(0 0 -0.0493)
        Coordinate jGroundBase_rz: motion_type=rotational default_value=0 initial_value=0 range=(-3.14 3.14)
            clamped=true
        Coordinate jGroundBase_rx: motion_type=rotational default_value=0 initial_value=0 range=(-3.14 3.14)
            clamped=true
        Coordinate jGroundBase_ry: motion_type=rotational default_value=0 initial_value=0 range=(-3.14 3.14)
            clamped=true
        Coordinate jGroundBase_tx: motion_type=translational default_value=0 initial_value=0 range=(-Inf Inf)
            clamped=true
        Coordinate jGroundBase_ty: motion_type=translational default_value=0 initial_value=0 range=(-Inf Inf)
            clamped=true
        Coordinate jGroundBase_tz: motion_type=translational default_value=0 initial_value=0 range=(-Inf Inf)
            clamped=true
        SpatialTransform:
          TransformAxis rotation1: coordinates=jGroundBase_rz axis=(0 0 1) LinearFunction(coefficients=1 0)
          TransformAxis rotation2: coordinates=jGroundBase_rx axis=(1 0 0) LinearFunction(coefficients=1 0)
          TransformAxis rotation3: coordinates=jGroundBase_ry axis=(0 1 0) LinearFunction(coefficients=1 0)
          TransformAxis translation1: coordinates=jGroundBase_tx axis=(1 0 0) LinearFunction(coefficients=1 0)
          TransformAxis translation2: coordinates=jGroundBase_ty axis=(0 1 0) LinearFunction(coefficients=1 0)
          TransformAxis translation3: coordinates=jGroundBase_tz axis=(0 0 1) LinearFunction(coefficients=1 0)
    # Chain from (2) to (7)
    Body L5_f1: mass=0 meshes=cylinder.vtp
      CustomJoint jL5S1_rotx: parent_body=Pelvis location_in_parent=jL5S1_ORIGIN location=(0 0 0)
        Coordinate jL5S1_rotx: motion_type=rotational default_value=0 range=(-1.570796 1.570796) clamped=false
        SpatialTransform:
          TransformAxis rotation1: coordinates=jL5S1_rotx axis=(1 0 0) LinearFunction(coefficients=1 0)
          # 3 Axes for translations are listed next.
    Body L5_f2: mass=0 meshes=cylinder.vtp
      CustomJoint jL5S1_roty: parent_body=L5_f1 location_in_parent=(0 0 0) location=(0 0 0)
        Coordinate jL5S1_roty: motion_type=rotational default_value=0 range=(-1.570796 1.570796) clamped=false
        SpatialTransform:
          TransformAxis rotation2: coordinates=jL5S1_roty axis=(0 1 0) LinearFunction(coefficients=1 0)
          # 3 Axes for translations are listed next.
    Body L5: mass=L5MASS mass_center=L5_COM_ORIGIN inertia_xx=L5INERTIAIXX inertia_yy=L5INERTIAIYY
        inertia_zz=L5INERTIAIZZ meshes=cylinder.vtp
      CustomJoint jL5S1_rotz: parent_body=L5_f2 location_in_parent=(0 0 0) location=(0 0 0)
        Coordinate jL5S1_rotz: motion_type=rotational default_value=0 range=(-1.570796 1.570796) clamped=false
        SpatialTransform:
          TransformAxis rotation3: coordinates=jL5S1_rotz axis=(0 0 1) LinearFunction(coefficients=1 0)
          # 3 Axes for translations are listed next.
    Body L3_f1: mass=0 meshes=cylinder.vtp
      CustomJoint jL4L3_rotx: parent_body=L5 location_in_parent=jL4L3_ORIGIN location=(0 0 0)
        Coordinate jL4L3_rotx: motion_type=rotational default_value=0 range=(-1.570796 1.570796) clamped=false
        SpatialTransform:
          TransformAxis rotation1: coordinates=jL4L3_rotx axis=(1 0 0) LinearFunction(coefficients=1 0)
          # 3 Axes for translations are listed next.
    Body L3_f2: mass=0 meshes=cylinder.vtp
      CustomJoint jL4L3_roty: parent_body=L3_f1 location_in_parent=(0 0 0) location=(0 0 0)
        Coordinate jL4L3_roty: motion_type=rotational default_value=0 range=(-1.570796 1.570796) clamped=false
        SpatialTransform:
          TransformAxis rotation2: coordinates=jL4L3_roty axis=(0 1 0) LinearFunction(coefficients=1 0)
          # 3 Axes for translations are listed next.
    Body L3: mass=L3MASS mass_center=L3_COM_ORIGIN inertia_xx=L3INERTIAIXX inertia_yy=L3INERTIAIYY
        inertia_zz=L3INERTIAIZZ meshes=cylinder.vtp
      CustomJoint jL4L3_rotz: parent_body=L3_f2 location_in_parent=(0 0 0) location=(0 0 0)
        Coordinate jL4L3_rotz: motion_type=rotational default_value=0 range=(-1.570796 1.570796) clamped=false
        SpatialTransform:
          TransformAxis rotation3: coordinates=jL4L3_rotz axis=(0 0 1) LinearFunction(coefficients=1 0)
          # 3 Axes for translations are listed next.
    Body T12_f1: mass=0 meshes=cylinder.vtp
      CustomJoint jL1T12_rotx: parent_body=L3 location_in_parent=jL1T12_ORIGIN location=(0 0 0)
        Coordinate jL1T12_rotx: motion_type=rotational default_value=0 range=(-1.570796 1.570796) clamped=false
        SpatialTransform:
          TransformAxis rotation1: coordinates=jL1T12_rotx axis=(1 0 0) LinearFunction(coefficients=1 0)
          # 3 Axes for translations are listed next.
    Body T12_f2: mass=0 meshes=cylinder.vtp
      CustomJoint jL1T12_roty: parent_body=T12_f1 location_in_parent=(0 0 0) location=(0 0 0)
        Coordinate jL1T12_roty: motion_type=rotational default_value=0 range=(-1.570796 1.570796) clamped=false
        SpatialTransform:
          TransformAxis rotation2: coordinates=jL1T12_roty axis=(0 1 0) LinearFunction(coefficients=1 0)
          # 3 Axes for translations are listed next.
    Body T12: mass=T12MASS mass_center=T12_COM_ORIGIN inertia_xx=T12INERTIAIXX inertia_yy=T12INERTIAIYY
        inertia_zz=T12INERTIAIZZ meshes=cylinder.vtp
      CustomJoint jL1T12_rotz: parent_body=T12_f2 location_in_parent=(0 0 0) location=(0 0 0)
        Coordinate jL1T12_rotz: motion_type=rotational default_value=0 range=(-1.570796 1.570796) clamped=false
        SpatialTransform:
          TransformAxis rotation3: coordinates=jL1T12_rotz axis=(0 0 1) LinearFunction(coefficients=1 0)
          # 3 Axes for translations are listed next.
    Body T8_f1: mass=0 meshes=cylinder.vtp
      CustomJoint jT9T8_rotx: parent_body=T12 location_in_parent=jT9T8_ORIGIN location=(0 0 0)
        Coordinate jT9T8_rotx: motion_type=rotational default_value=0 range=(-1.570796 1.570796) clamped=false
        SpatialTransform:
          TransformAxis rotation1: coordinates=jT9T8_rotx axis=(1 0 0) LinearFunction(coefficients=1 0)
          # 3 Axes for translations are listed next.
    Body T8_f2: mass=0 meshes=cylinder.vtp
      CustomJoint jT9T8_roty: parent_body=T8_f1 location_in_parent=(0 0 0) location=(0 0 0)
        Coordinate jT9T8_roty: motion_type=rotational default_value=0 range=(-1.570796 1.570796) clamped=false
        SpatialTransform:
          TransformAxis rotation2: coordinates=jT9T8_roty axis=(0 1 0) LinearFunction(coefficients=1 0)
          # 3 Axes for translations are listed next.
    Body T8: mass=T8MASS mass_center=T8_COM_ORIGIN inertia_xx=T8INERTIAIXX inertia_yy=T8INERTIAIYY
        inertia_zz=T8INERTIAIZZ meshes=box.vtp
      CustomJoint jT9T8_rotz: parent_body=T8_f2 location_in_parent=(0 0 0) location=(0 0 0)
        Coordinate jT9T8_rotz: motion_type=rotational default_value=0 range=(-1.570796 1.570796) clamped=false
        SpatialTransform:
          TransformAxis rotation3: coordinates=jT9T8_rotz axis=(0 0 1) LinearFunction(coefficients=1 0)
          # 3 Axes for translations are listed next.
    Body Neck_f1: mass=0 meshes=cylinder.vtp
      CustomJoint jT1C7_rotx: parent_body=T8 location_in_parent=jT1C7_ORIGIN location=(0 0 0)
        Coordinate jT1C7_rotx: motion_type=rotational default_value=0 range=(-1.570796 1.570796) clamped=false
        SpatialTransform:
          TransformAxis rotation1: coordinates=jT1C7_rotx axis=(1 0 0) LinearFunction(coefficients=1 0)
          # 3 Axes for translations are listed next.
    Body Neck_f2: mass=0 meshes=cylinder.vtp
      CustomJoint jT1C7_roty: parent_body=Neck_f1 location_in_parent=(0 0 0) location=(0 0 0)
        Coordinate jT1C7_roty: motion_type=rotational default_value=0 range=(-1.570796 1.570796) clamped=false
        SpatialTransform:
          TransformAxis rotation2: coordinates=jT1C7_roty axis=(0 1 0) LinearFunction(coefficients=1 0)
          # 3 Axes for translations are listed next.
    Body Neck: mass=NECKMASS mass_center=NECK_COM_ORIGIN inertia_xx=NECKINERTIAIXX inertia_yy=NECKINERTIAIYY
        inertia_zz=NECKINERTIAIZZ meshes=cylinder.vtp
      CustomJoint jT1C7_rotz: parent_body=Neck_f2 location_in_parent=(0 0 0) location=(0 0 0)
        Coordinate jT1C7_rotz: motion_type=rotational default_value=0 range=(-1.570796 1.570796) clamped=false
        SpatialTransform:
          TransformAxis rotation3: coordinates=jT1C7_rotz axis=(0 0 1) LinearFunction(coefficients=1 0)
          # 3 Axes for translations are listed next.
    Body Head_f1: mass=0 meshes=sphere.vtp
      CustomJoint jC1Head_rotx: parent_body=Neck location_in_parent=jC1Head_ORIGIN location=(0 0 0)
        Coordinate jC1Head_rotx: motion_type=rotational default_value=0 range=(-1.570796 1.570796) clamped=false
        SpatialTransform:
          TransformAxis rotation1: coordinates=jC1Head_rotx axis=(1 0 0) LinearFunction(coefficients=1 0)
          # 3 Axes for translations are listed next.
    Body Head_f2: mass=0 meshes=sphere.vtp
      CustomJoint jC1Head_roty: parent_body=Head_f1 location_in_parent=(0 0 0) location=(0 0 0)
        Coordinate jC1Head_roty: motion_type=rotational default_value=0 range=(-1.570796 1.570796) clamped=false
        SpatialTransform:
          TransformAxis rotation2: coordinates=jC1Head_roty axis=(0 1 0) LinearFunction(coefficients=1 0)
          # 3 Axes for translations are listed next.
    Body Head: mass=HEADMASS mass_center=HEAD_COM_ORIGIN inertia_xx=HEADINERTIAIXX inertia_yy=HEADINERTIAIYY
        inertia_zz=HEADINERTIAIZZ meshes=sphere.vtp
      CustomJoint jC1Head_rotz: parent_body=Head_f2 location_in_parent=(0 0 0) location=(0 0 0)
        Coordinate jC1Head_rotz: motion_type=rotational default_value=0 range=(-1.570796 1.570796) clamped=false
        SpatialTransform:
          TransformAxis rotation3: coordinates=jC1Head_rotz axis=(0 0 1) LinearFunction(coefficients=1 0)
          # 3 Axes for translations are listed next.
    # Chain from (8) to (11)
    Body RightShoulder_f1: mass=0 meshes=cylinder.vtp
      CustomJoint jRightC7Shoulder_rotx: parent_body=T8 location_in_parent=jRightC7Shoulder_ORIGIN location=(0 0 0)
        Coordinate jRightC7Shoulder_rotx: motion_type=rotational default_value=0 range=(-1.570796 1.570796)
            clamped=false
        SpatialTransform:
          TransformAxis rotation1: coordinates=jRightC7Shoulder_rotx axis=(1 0 0) LinearFunction(coefficients=1 0)
          # 3 Axes for translations are listed next.
    Body RightShoulder_f2: mass=0 meshes=cylinder.vtp
      CustomJoint jRightC7Shoulder_roty: parent_body=RightShoulder_f1 location_in_parent=(0 0 0) location=(0 0 0)
        Coordinate jRightC7Shoulder_roty: motion_type=rotational default_value=0 range=(-1.570796 1.570796)
            clamped=false
        SpatialTransform:
          TransformAxis rotation2: coordinates=jRightC7Shoulder_roty axis=(0 1 0) LinearFunction(coefficients=1 0)
          # 3 Axes for translations are listed next.
    Body RightShoulder: mass=RIGHTSHOULDERMASS mass_center=RIGHTSHOULDER_COM_ORIGIN inertia_xx=RIGHTSHOULDERINERTIAIXX
        inertia_yy=RIGHTSHOULDERINERTIAIYY inertia_zz=RIGHTSHOULDERINERTIAIZZ meshes=cylinder.vtp
      CustomJoint jRightC7Shoulder_rotz: parent_body=RightShoulder_f2 location_in_parent=(0 0 0) location=(0 0 0)
        Coordinate jRightC7Shoulder_rotz: motion_type=rotational default_value=0 range=(-1.570796 1.570796)
            clamped=false
        SpatialTransform:
          TransformAxis rotation3: coordinates=jRightC7Shoulder_rotz axis=(0 0 1) LinearFunction(coefficients=1 0)
          # 3 Axes for translations are listed next.
    Body RightUpperArm_f1: mass=0 meshes=cylinder.vtp
      CustomJoint jRightShoulder_rotx: parent_body=RightShoulder location_in_parent=jRightShoulder_ORIGIN
          location=(0 0 0)
        Coordinate jRightShoulder_rotx: motion_type=rotational default_value=0 range=(-1.570796 1.570796) clamped=false
        SpatialTransform:
          TransformAxis rotation1: coordinates=jRightShoulder_rotx axis=(1 0 0) LinearFunction(coefficients=1 0)
          # 3 Axes for translations are listed next.
    Body RightUpperArm_f2: mass=0 meshes=cylinder.vtp
      CustomJoint jRightShoulder_roty: parent_body=RightUpperArm_f1 location_in_parent=(0 0 0) location=(0 0 0)
        Coordinate jRightShoulder_roty: motion_type=rotational default_value=0 range=(-1.570796 1.570796) clamped=false
        SpatialTransform:
          TransformAxis rotation2: coordinates=jRightShoulder_roty axis=(0 1 0) LinearFunction(coefficients=1 0)
          # 3 Axes for translations are listed next.
    Body RightUpperArm: mass=RIGHTUPPERARMMASS mass_center=RIGHTUPPERARM_COM_ORIGIN inertia_xx=RIGHTUPPERARMINERTIAIXX
        inertia_yy=RIGHTUPPERARMINERTIAIYY inertia_zz=RIGHTUPPERARMINERTIAIZZ meshes=cylinder.vtp
      CustomJoint jRightShoulder_rotz: parent_body=RightUpperArm_f2 location_in_parent=(0 0 0) location=(0 0 0)
        Coordinate jRightShoulder_rotz: motion_type=rotational default_value=0 range=(-1.570796 1.570796) clamped=false
        SpatialTransform:
          TransformAxis rotation3: coordinates=jRightShoulder_rotz axis=(0 0 1) LinearFunction(coefficients=1 0)
          # 3 Axes for translations are listed next.
    Body RightForeArm_f1: mass=0 meshes=cylinder.vtp
      CustomJoint jRightElbow_rotx: parent_body=RightUpperArm location_in_parent=jRightElbow_ORIGIN location=(0 0 0)
        Coordinate jRightElbow_rotx: motion_type=rotational default_value=0 range=(-1.570796 1.570796) clamped=false
        SpatialTransform:
          TransformAxis rotation1: coordinates=jRightElbow_rotx axis=(1 0 0) LinearFunction(coefficients=1 0)
          # 3 Axes for translations are listed next.
    Body RightForeArm_f2: mass=0 meshes=cylinder.vtp
      CustomJoint jRightElbow_roty: parent_body=RightForeArm_f1 location_in_parent=(0 0 0) location=(0 0 0)
        Coordinate jRightElbow_roty: motion_type=rotational default_value=0 range=(-1.570796 1.570796) clamped=false
        SpatialTransform:
          TransformAxis rotation2: coordinates=jRightElbow_roty axis=(0 1 0) LinearFunction(coefficients=1 0)
          # 3 Axes for translations are listed next.
    Body RightForeArm: mass=RIGHTFOREARMMASS mass_center=RIGHTFOREARM_COM_ORIGIN inertia_xx=RIGHTFOREARMINERTIAIXX
        inertia_yy=RIGHTFOREARMINERTIAIYY inertia_zz=RIGHTFOREARMINERTIAIZZ meshes=cylinder.vtp
      CustomJoint jRightElbow_rotz: parent_body=RightForeArm_f2 location_in_parent=(0 0 0) location=(0 0 0)
        Coordinate jRightElbow_rotz: motion_type=rotational default_value=0 range=(-1.570796 1.570796) clamped=false
        SpatialTransform:
          TransformAxis rotation3: coordinates=jRightElbow_rotz axis=(0 0 1) LinearFunction(coefficients=1 0)
          # 3 Axes for translations are listed next.
    Body RightHand_f1: mass=0 meshes=box.vtp
      CustomJoint jRightWrist_rotx: parent_body=RightForeArm location_in_parent=jRightWrist_ORIGIN location=(0 0 0)
        Coordinate jRightWrist_rotx: motion_type=rotational default_value=0 range=(-1.570796 1.570796) clamped=false
        SpatialTransform:
          TransformAxis rotation1: coordinates=jRightWrist_rotx axis=(1 0 0) LinearFunction(coefficients=1 0)
          # 3 Axes for translations are listed next.
    Body RightHand_f2: mass=0 meshes=box.vtp
      CustomJoint jRightWrist_roty: parent_body=RightHand_f1 location_in_parent=(0 0 0) location=(0 0 0)
        Coordinate jRightWrist_roty: motion_type=rotational default_value=0 range=(-1.570796 1.570796) clamped=false
        SpatialTransform:
          TransformAxis rotation2: coordinates=jRightWrist_roty axis=(0 1 0) LinearFunction(coefficients=1 0)
          # 3 Axes for translations are listed next.
    Body RightHand: mass=RIGHTHANDMASS mass_center=RIGHTHAND_COM_ORIGIN inertia_xx=RIGHTHANDINERTIAIXX
        inertia_yy=RIGHTHANDINERTIAIYY inertia_zz=RIGHTHANDINERTIAIZZ meshes=box.vtp
      CustomJoint jRightWrist_rotz: parent_body=RightHand_f2 location_in_parent=(0 0 0) location=(0 0 0)
        Coordinate jRightWrist_rotz: motion_type=rotational default_value=0 range=(-1.570796 1.570796) clamped=false
        SpatialTransform:
          TransformAxis rotation3: coordinates=jRightWrist_rotz axis=(0 0 1) LinearFunction(coefficients=1 0)
          # 3 Axes for translations are listed next.
    # Chain from (12) to (15)
    Body LeftShoulder_f1: mass=0 meshes=cylinder.vtp
      CustomJoint jLeftC7Shoulder_rotx: parent_body=T8 location_in_parent=jLeftC7Shoulder_ORIGIN location=(0 0 0)
        Coordinate jLeftC7Shoulder_rotx: motion_type=rotational default_value=0 range=(-1.570796 1.570796)
            clamped=false
        SpatialTransform:
          TransformAxis rotation1: coordinates=jLeftC7Shoulder_rotx axis=(1 0 0) LinearFunction(coefficients=1 0)
          # 3 Axes for translations are listed next.
    Body LeftShoulder_f2: mass=0 meshes=cylinder.vtp
      CustomJoint jLeftC7Shoulder_roty: parent_body=LeftShoulder_f1 location_in_parent=(0 0 0) location=(0 0 0)
        Coordinate jLeftC7Shoulder_roty: motion_type=rotational default_value=0 range=(-1.570796 1.570796)
            clamped=false
        SpatialTransform:
          TransformAxis rotation2: coordinates=jLeftC7Shoulder_roty axis=(0 1 0) LinearFunction(coefficients=1 0)
          # 3 Axes for translations are listed next.
    Body LeftShoulder: mass=LEFTSHOULDERMASS mass_center=LEFTSHOULDER_COM_ORIGIN inertia_xx=RIGHTSHOULDERINERTIAIXX
        inertia_yy=LEFTSHOULDERINERTIAIYY inertia_zz=LEFTSHOULDERINERTIAIZZ meshes=cylinder.vtp
      CustomJoint jLeftC7Shoulder_rotz: parent_body=LeftShoulder_f2 location_in_parent=(0 0 0) location=(0 0 0)
        Coordinate jLeftC7Shoulder_rotz: motion_type=rotational default_value=0 range=(-1.570796 1.570796)
            clamped=false
        SpatialTransform:
          TransformAxis rotation3: coordinates=jLeftC7Shoulder_rotz axis=(0 0 1) LinearFunction(coefficients=1 0)
          # 3 Axes for translations are listed next.
    Body LeftUpperArm_f1: mass=0 meshes=cylinder.vtp
      CustomJoint jLeftShoulder_rotx: parent_body=LeftShoulder location_in_parent=jLeftShoulder_ORIGIN location=(0 0 0)
        Coordinate jLeftShoulder_rotx: motion_type=rotational default_value=0 range=(-1.570796 1.570796) clamped=false
        SpatialTransform:
          TransformAxis rotation1: coordinates=jLeftShoulder_rotx axis=(1 0 0) LinearFunction(coefficients=1 0)
          # 3 Axes for translations are listed next.
    Body LeftUpperArm_f2: mass=0 meshes=cylinder.vtp
      CustomJoint jLeftShoulder_roty: parent_body=LeftUpperArm_f1 location_in_parent=(0 0 0) location=(0 0 0)
        Coordinate jLeftShoulder_roty: motion_type=rotational default_value=0 range=(-1.570796 1.570796) clamped=false
        SpatialTransform:
          TransformAxis rotation2: coordinates=jLeftShoulder_roty axis=(0 1 0) LinearFunction(coefficients=1 0)
          # 3 Axes for translations are listed next.
    Body LeftUpperArm: mass=LEFTUPPERARMMASS mass_center=LEFTUPPERARM_COM_ORIGIN inertia_xx=LEFTUPPERARMINERTIAIXX
        inertia_yy=LEFTUPPERARMINERTIAIYY inertia_zz=LEFTUPPERARMINERTIAIZZ meshes=cylinder.vtp
      CustomJoint jLeftShoulder_rotz: parent_body=LeftUpperArm_f2 location_in_parent=(0 0 0) location=(0 0 0)
        Coordinate jLeftShoulder_rotz: motion_type=rotational default_value=0 range=(-1.570796 1.570796) clamped=false
        SpatialTransform:
          TransformAxis rotation3: coordinates=jLeftShoulder_rotz axis=(0 0 1) LinearFunction(coefficients=1 0)
          # 3 Axes for translations are listed next.
    Body LeftForeArm_f1: mass=0 meshes=cylinder.vtp
      CustomJoint jLeftElbow_rotx: parent_body=LeftUpperArm location_in_parent=jLeftElbow_ORIGIN location=(0 0 0)
        Coordinate jLeftElbow_rotx: motion_type=rotational default_value=0 range=(-1.570796 1.570796) clamped=false
        SpatialTransform:
          TransformAxis rotation1: coordinates=jLeftElbow_rotx axis=(1 0 0) LinearFunction(coefficients=1 0)
          # 3 Axes for translations are listed next.
    Body LeftForeArm_f2: mass=0 meshes=cylinder.vtp
      CustomJoint jLeftElbow_roty: parent_body=LeftForeArm_f1 location_in_parent=(0 0 0) location=(0 0 0)
        Coordinate jLeftElbow_roty: motion_type=rotational default_value=0 range=(-1.570796 1.570796) clamped=false
        SpatialTransform:
          TransformAxis rotation2: coordinates=jLeftElbow_roty axis=(0 1 0) LinearFunction(coefficients=1 0)
          # 3 Axes for translations are listed next.
    Body LeftForeArm: mass=LEFTFOREARMMASS mass_center=LEFTFOREARM_COM_ORIGIN inertia_xx=LEFTFOREARMINERTIAIXX
        inertia_yy=LEFTFOREARMINERTIAIYY inertia_zz=LEFTFOREARMINERTIAIZZ meshes=cylinder.vtp
      CustomJoint jLeftElbow_rotz: parent_body=LeftForeArm_f2 location_in_parent=(0 0 0) location=(0 0 0)
        Coordinate jLeftElbow_rotz: motion_type=rotational default_value=0 range=(-1.570796 1.570796) clamped=false
        SpatialTransform:
          TransformAxis rotation3: coordinates=jLeftElbow_rotz axis=(0 0 1) LinearFunction(coefficients=1 0)
          # 3 Axes for translations are listed next.
    Body LeftHand_f1: mass=0 meshes=box.vtp
      CustomJoint jLeftWrist_rotx: parent_body=LeftForeArm location_in_parent=jLeftWrist_ORIGIN location=(0 0 0)
        Coordinate jLeftWrist_rotx: motion_type=rotational default_value=0 range=(-1.570796 1.570796) clamped=false
        SpatialTransform:
          TransformAxis rotation1: coordinates=jLeftWrist_rotx axis=(1 0 0) LinearFunction(coefficients=1 0)
          # 3 Axes for translations are listed next.
    Body LeftHand_f2: mass=0 meshes=box.vtp
      CustomJoint jLeftWrist_roty: parent_body=LeftHand_f1 location_in_parent=(0 0 0) location=(0 0 0)
        Coordinate jLeftWrist_roty: motion_type=rotational default_value=0 range=(-1.570796 1.570796) clamped=false
        SpatialTransform:
          TransformAxis rotation2: coordinates=jLeftWrist_roty axis=(0 1 0) LinearFunction(coefficients=1 0)
          # 3 Axes for translations are listed next.
    Body LeftHand: mass=LEFTHANDMASS mass_center=LEFTHAND_COM_ORIGIN inertia_xx=LEFTHANDINERTIAIXX
        inertia_yy=LEFTHANDINERTIAIYY inertia_zz=LEFTHANDINERTIAIZZ meshes=box.vtp
      CustomJoint jLeftWrist_rotz: parent_body=LeftHand_f2 location_in_parent=(0 0 0) location=(0 0 0)
        Coordinate jLeftWrist_rotz: motion_type=rotational default_value=0 range=(-1.570796 1.570796) clamped=false
        SpatialTransform:
          TransformAxis rotation3: coordinates=jLeftWrist_rotz axis=(0 0 1) LinearFunction(coefficients=1 0)
          # 3 Axes for translations are listed next.
    # Chain from (16) to (19)
    Body RightUpperLeg_f1: mass=0 meshes=cylinder.vtp
      CustomJoint jRightHip_rotx: parent_body=Pelvis location_in_parent=jRightHip_ORIGIN location=(0 0 0)
        Coordinate jRightHip_rotx: motion_type=rotational default_value=0 range=(-1.570796 1.570796) clamped=false
        SpatialTransform:
          TransformAxis rotation1: coordinates=jRightHip_rotx axis=(1 0 0) LinearFunction(coefficients=1 0)
          # 3 Axes for translations are listed next.
    Body RightUpperLeg_f2: mass=0 meshes=cylinder.vtp
      CustomJoint jRightHip_roty: parent_body=RightUpperLeg_f1 location_in_parent=(0 0 0) location=(0 0 0)
        Coordinate jRightHip_roty: motion_type=rotational default_value=0 range=(-1.570796 1.570796) clamped=false
        SpatialTransform:
          TransformAxis rotation2: coordinates=jRightHip_roty axis=(0 1 0) LinearFunction(coefficients=1 0)
          # 3 Axes for translations are listed next.
    Body RightUpperLeg: mass=RIGHTUPPERLEGMASS mass_center=RIGHTUPPERLEG_COM_ORIGIN inertia_xx=RIGHTUPPERLEGINERTIAIXX
        inertia_yy=RIGHTUPPERLEGINERTIAIYY inertia_zz=RIGHTUPPERLEGINERTIAIZZ meshes=cylinder.vtp
      CustomJoint jRightHip_rotz: parent_body=RightUpperLeg_f2 location_in_parent=(0 0 0) location=(0 0 0)
        Coordinate jRightHip_rotz: motion_type=rotational default_value=0 range=(-1.570796 1.570796) clamped=false
        SpatialTransform:
          TransformAxis rotation3: coordinates=jRightHip_rotz axis=(0 0 1) LinearFunction(coefficients=1 0)
          # 3 Axes for translations are listed next.
    Body RightLowerLeg_f1: mass=0 meshes=cylinder.vtp
      CustomJoint jRightKnee_rotx: parent_body=RightUpperLeg location_in_parent=jRightKnee_ORIGIN location=(0 0 0)
        Coordinate jRightKnee_rotx: motion_type=rotational default_value=0 range=(-1.570796 1.570796) clamped=false
        SpatialTransform:
          TransformAxis rotation1: coordinates=jRightKnee_rotx axis=(1 0 0) LinearFunction(coefficients=1 0)
          # 3 Axes for translations are listed next.
    Body RightLowerLeg_f2: mass=0 meshes=cylinder.vtp
      CustomJoint jRightKnee_roty: parent_body=RightLowerLeg_f1 location_in_parent=(0 0 0) location=(0 0 0)
        Coordinate jRightKnee_roty: motion_type=rotational default_value=0 range=(-1.570796 1.570796) clamped=false
        SpatialTransform:
          TransformAxis rotation2: coordinates=jRightKnee_roty axis=(0 1 0) LinearFunction(coefficients=1 0)
          # 3 Axes for translations are listed next.
    Body RightLowerLeg: mass=RIGHTLOWERLEGMASS mass_center=RIGHTLOWERLEG_COM_ORIGIN inertia_xx=RIGHTLOWERLEGINERTIAIXX
        inertia_yy=RIGHTLOWERLEGINERTIAIYY inertia_zz=RIGHTLOWERLEGINERTIAIZZ meshes=cylinder.vtp
      CustomJoint jRightKnee_rotz: parent_body=RightLowerLeg_f2 location_in_parent=(0 0 0) location=(0 0 0)
        Coordinate jRightKnee_rotz: motion_type=rotational default_value=0 range=(-1.570796 1.570796) clamped=false
        SpatialTransform:
          TransformAxis rotation3: coordinates=jRightKnee_rotz axis=(0 0 1) LinearFunction(coefficients=1 0)
          # 3 Axes for translations are listed next.
    Body RightFoot_f1: mass=0 meshes=cylinder.vtp
      CustomJoint jRightAnkle_rotx: parent_body=RightLowerLeg location_in_parent=jRightAnkle_ORIGIN location=(0 0 0)
        Coordinate jRightAnkle_rotx: motion_type=rotational default_value=0 range=(-1.570796 1.570796) clamped=false
        SpatialTransform:
          TransformAxis rotation1: coordinates=jRightAnkle_rotx axis=(1 0 0) LinearFunction(coefficients=1 0)
          # 3 Axes for translations are listed next.
    Body RightFoot_f2: mass=0 meshes=cylinder.vtp
      CustomJoint jRightAnkle_roty: parent_body=RightFoot_f1 location_in_parent=(0 0 0) location=(0 0 0)
        Coordinate jRightAnkle_roty: motion_type=rotational default_value=0 range=(-1.570796 1.570796) clamped=false
        SpatialTransform:
          TransformAxis rotation2: coordinates=jRightAnkle_roty axis=(0 1 0) LinearFunction(coefficients=1 0)
          # 3 Axes for translations are listed next.
    Body RightFoot: mass=RIGHTFOOTMASS mass_center=RIGHTFOOT_COM_ORIGIN inertia_xx=RIGHTFOOTINERTIAIXX
        inertia_yy=RIGHTFOOTINERTIAIYY inertia_zz=RIGHTFOOTINERTIAIZZ meshes=box.vtp
      CustomJoint jRightAnkle_rotz: parent_body=RightFoot_f2 location_in_parent=(0 0 0) location=(0 0 0)
        Coordinate jRightAnkle_rotz: motion_type=rotational default_value=0 range=(-1.570796 1.570796) clamped=false
        SpatialTransform:
          TransformAxis rotation3: coordinates=jRightAnkle_rotz axis=(0 0 1) LinearFunction(coefficients=1 0)
          # 3 Axes for translations are listed next.
    Body RightToe_f1: mass=0 meshes=cylinder.vtp
      CustomJoint jRightBallFoot_rotx: parent_body=RightFoot location_in_parent=jRightBallFoot_ORIGIN location=(0 0 0)
        Coordinate jRightBallFoot_rotx: motion_type=rotational default_value=0 range=(-1.570796 1.570796) clamped=false
        SpatialTransform:
          TransformAxis rotation1: coordinates=jRightBallFoot_rotx axis=(1 0 0) LinearFunction(coefficients=1 0)
          # 3 Axes for translations are listed next.
    Body RightToe_f2: mass=0 meshes=cylinder.vtp
      CustomJoint jRightBallFoot_roty: parent_body=RightToe_f1 location_in_parent=(0 0 0) location=(0 0 0)
        Coordinate jRightBallFoot_roty: motion_type=rotational default_value=0 range=(-1.570796 1.570796) clamped=false
        SpatialTransform:
          TransformAxis rotation2: coordinates=jRightBallFoot_roty axis=(0 1 0) LinearFunction(coefficients=1 0)
          # 3 Axes for translations are listed next.
    Body RightToe: mass=RIGHTTOEMASS mass_center=RIGHTTOE_COM_ORIGIN inertia_xx=RIGHTTOEINERTIAIXX
        inertia_yy=RIGHTTOEINERTIAIYY inertia_zz=RIGHTTOEINERTIAIZZ meshes=box.vtp
      CustomJoint jRightBallFoot_rotz: parent_body=RightToe_f2 location_in_parent=(0 0 0) location=(0 0 0)
        Coordinate jRightBallFoot_rotz: motion_type=rotational default_value=0 range=(-1.570796 1.570796) clamped=false
        SpatialTransform:
          TransformAxis rotation3: coordinates=jRightBallFoot_rotz axis=(0 0 1) LinearFunction(coefficients=1 0)
          # 3 Axes for translations are listed next.
    # Chain from (20) to (23)
    Body LeftUpperLeg_f1: mass=0 meshes=cylinder.vtp
      CustomJoint jLeftHip_rotx: parent_body=Pelvis location_in_parent=jLeftHip_ORIGIN location=(0 0 0)
        Coordinate jLeftHip_rotx: motion_type=rotational default_value=0 range=(-1.570796 1.570796) clamped=false
        SpatialTransform:
          TransformAxis rotation1: coordinates=jLeftHip_rotx axis=(1 0 0) LinearFunction(coefficients=1 0)
          # 3 Axes for translations are listed next.
    Body LeftUpperLeg_f2: mass=0 meshes=cylinder.vtp
      CustomJoint jLeftHip_roty: parent_body=LeftUpperLeg_f1 location_in_parent=(0 0 0) location=(0 0 0)
        Coordinate jLeftHip_roty: motion_type=rotational default_value=0 range=(-1.570796 1.570796) clamped=false
        SpatialTransform:
          TransformAxis rotation2: coordinates=jLeftHip_roty axis=(0 1 0) LinearFunction(coefficients=1 0)
          # 3 Axes for translations are listed next.
    Body LeftUpperLeg: mass=LEFTUPPERLEGMASS mass_center=LEFTUPPERLEG_COM_ORIGIN inertia_xx=LEFTUPPERLEGINERTIAIXX
        inertia_yy=LEFTUPPERLEGINERTIAIYY inertia_zz=LEFTUPPERLEGINERTIAIZZ meshes=cylinder.vtp
      CustomJoint jLeftHip_rotz: parent_body=LeftUpperLeg_f2 location_in_parent=(0 0 0) location=(0 0 0)
        Coordinate jLeftHip_rotz: motion_type=rotational default_value=0 range=(-1.570796 1.570796) clamped=false
        SpatialTransform:
          TransformAxis rotation3: coordinates=jLeftHip_rotz axis=(0 0 1) LinearFunction(coefficients=1 0)
          # 3 Axes for translations are listed next.
    Body LeftLowerLeg_f1: mass=0 meshes=cylinder.vtp
      CustomJoint jLeftKnee_rotx: parent_body=LeftUpperLeg location_in_parent=jLeftKnee_ORIGIN location=(0 0 0)
        Coordinate jLeftKnee_rotx: motion_type=rotational default_value=0 range=(-1.570796 1.570796) clamped=false
        SpatialTransform:
          TransformAxis rotation1: coordinates=jLeftKnee_rotx axis=(1 0 0) LinearFunction(coefficients=1 0)
          # 3 Axes for translations are listed next.
    Body LeftLowerLeg_f2: mass=0 meshes=cylinder.vtp
      CustomJoint jLeftKnee_roty: parent_body=LeftLowerLeg_f1 location_in_parent=(0 0 0) location=(0 0 0)
        Coordinate jLeftKnee_roty: motion_type=rotational default_value=0 range=(-1.570796 1.570796) clamped=false
        SpatialTransform:
          TransformAxis rotation2: coordinates=jLeftKnee_roty axis=(0 1 0) LinearFunction(coefficients=1 0)
          # 3 Axes for translations are listed next.
    Body LeftLowerLeg: mass=LEFTLOWERLEGMASS mass_center=LEFTLOWERLEG_COM_ORIGIN inertia_xx=LEFTLOWERLEGINERTIAIXX
        inertia_yy=LEFTLOWERLEGINERTIAIYY inertia_zz=LEFTLOWERLEGINERTIAIZZ meshes=cylinder.vtp
      CustomJoint jLeftKnee_rotz: parent_body=LeftLowerLeg_f2 location_in_parent=(0 0 0) location=(0 0 0)
        Coordinate jLeftKnee_rotz: motion_type=rotational default_value=0 range=(-1.570796 1.570796) clamped=false
        SpatialTransform:
          TransformAxis rotation3: coordinates=jLeftKnee_rotz axis=(0 0 1) LinearFunction(coefficients=1 0)
          # 3 Axes for translations are listed next.
    Body LeftFoot_f1: mass=0 meshes=cylinder.vtp
      CustomJoint jLeftAnkle_rotx: parent_body=LeftLowerLeg location_in_parent=jLeftAnkle_ORIGIN location=(0 0 0)
        Coordinate jLeftAnkle_rotx: motion_type=rotational default_value=0 range=(-1.570796 1.570796) clamped=false
        SpatialTransform:
          TransformAxis rotation1: coordinates=jLeftAnkle_rotx axis=(1 0 0) LinearFunction(coefficients=1 0)
          # 3 Axes for translations are listed next.
    Body LeftFoot_f2: mass=0 meshes=cylinder.vtp
      CustomJoint jLeftAnkle_roty: parent_body=LeftFoot_f1 location_in_parent=(0 0 0) location=(0 0 0)
        Coordinate jLeftAnkle_roty: motion_type=rotational default_value=0 range=(-1.570796 1.570796) clamped=false
        SpatialTransform:
          TransformAxis rotation2: coordinates=jLeftAnkle_roty axis=(0 1 0) LinearFunction(coefficients=1 0)
          # 3 Axes for translations are listed next.
    Body LeftFoot: mass=LEFTFOOTMASS mass_center=LEFTFOOT_COM_ORIGIN inertia_xx=LEFTFOOTINERTIAIXX
        inertia_yy=LEFTFOOTINERTIAIYY inertia_zz=LEFTFOOTINERTIAIZZ meshes=box.vtp
      CustomJoint jLeftAnkle_rotz: parent_body=LeftFoot_f2 location_in_parent=(0 0 0) location=(0 0 0)
        Coordinate jLeftAnkle_rotz: motion_type=rotational default_value=0 range=(-1.570796 1.570796) clamped=false
        SpatialTransform:
          TransformAxis rotation3: coordinates=jLeftAnkle_rotz axis=(0 0 1) LinearFunction(coefficients=1 0)
          # 3 Axes for translations are listed next.
    Body LeftToe_f1: mass=0 meshes=cylinder.vtp
      CustomJoint jLeftBallFoot_rotx: parent_body=LeftFoot location_in_parent=jLeftBallFoot_ORIGIN location=(0 0 0)
        Coordinate jLeftBallFoot_rotx: motion_type=rotational default_value=0 range=(-1.570796 1.570796) clamped=false
        SpatialTransform:
          TransformAxis rotation1: coordinates=jLeftBallFoot_rotx axis=(1 0 0) LinearFunction(coefficients=1 0)
          # 3 Axes for translations are listed next.
    Body LeftToe_f2: mass=0 meshes=cylinder.vtp
      CustomJoint jLeftBallFoot_roty: parent_body=LeftToe_f1 location_in_parent=(0 0 0) location=(0 0 0)
        Coordinate jLeftBallFoot_roty: motion_type=rotational default_value=0 range=(-1.570796 1.570796) clamped=false
        SpatialTransform:
          TransformAxis rotation2: coordinates=jLeftBallFoot_roty axis=(0 1 0) LinearFunction(coefficients=1 0)
          # 3 Axes for translations are listed next.
    Body LeftToe: mass=LEFTTOEMASS mass_center=LEFTTOE_COM_ORIGIN inertia_xx=LEFTTOEINERTIAIXX
        inertia_yy=LEFTTOEINERTIAIYY inertia_zz=LEFTTOEINERTIAIZZ meshes=box.vtp
      CustomJoint jLeftBallFoot_rotz: parent_body=LeftToe_f2 location_in_parent=(0 0 0) location=(0 0 0)
        Coordinate jLeftBallFoot_rotz: motion_type=rotational default_value=0 range=(-1.570796 1.570796) clamped=false
        SpatialTransform:
          TransformAxis rotation3: coordinates=jLeftBallFoot_rotz axis=(0 0 1) LinearFunction(coefficients=1 0)
          # 3 Axes for translations are listed next.
  MarkerSet:
    Marker pHipOrigin: Pelvis (PHIPORIGIN)
    Marker pRightASI: Pelvis (PRIGHTASI)
    Marker pLeftASI: Pelvis (PLEFTASI)
    Marker pRightCSI: Pelvis (PRIGHTCSI)
    Marker pLeftCSI: Pelvis (PLEFTCSI)
    Marker pRightIschialTub: Pelvis (PRIGHTISCHIALTUB)
    Marker pLeftIschialTub: Pelvis (PLEFTISCHIALTUB)
    Marker pSacrum: Pelvis (PSACRUM)
    Marker pL5SpinalProcess: L5 (PL5SPINALPROCESS)
    Marker pL3SpinalProcess: L3 (PL3SPINALPROCESS)
    Marker pT12SpinalProcess: T12 (PT12SPINALPROCESS)
    Marker pPX: T8 (PPX)
    Marker pIJ: T8 (PIJ)
    Marker pT4SpinalProcess: T8 (PT4SPINALPROCESS)
    Marker pT8SpinalProcess: T8 (PT8SPINALPROCESS)
    Marker pC7SpinalProcess: T8 (PC7SPINALPROCESS)
    Marker pTopOfHead: Head (PTOPOFHEAD)
    Marker pRightAuricularis: Head (PRIGHTAURICULARIS)
    Marker pLeftAuricularis: Head (PLEFTAURICULARIS)
    Marker pBackOfHead: Head (PBACKOFHEAD)
    Marker pRightAcromion: RightShoulder (PRIGHTACROMION)
    Marker pRightArmLatEpicondyle: RightUpperArm (PRIGHTARMLATEPICONDYLE)
    Marker pRightArmMedEpicondyle: RightUpperArm (PRIGHTARMMEDEPICONDYLE)
    Marker pRightUlnarStyloid: RightForeArm (PRIGHTULNARSTYLOID)
    Marker pRightRadialStyloid: RightForeArm (PRIGHTRADIALSTYLOID)
    Marker pRightOlecranon: RightForeArm (PRIGHTOLECRANON)
    Marker pRightTopOfHand: RightHand (PRIGHTTOPOFHAND)
    Marker pRightPinky: RightHand (PRIGHTPINKY)
    Marker pRightBallHand: RightHand (PRIGHTBALLHAND)
    Marker pLeftAcromion: LeftShoulder (PLEFTACROMION)
    Marker pLeftArmLatEpicondyle: LeftUpperArm (PLEFTARMLATEPICONDYLE)
    Marker pLeftArmMedEpicondyle: LeftUpperArm (PLEFTARMMEDEPICONDYLE)
    Marker pLeftUlnarStyloid: LeftForeArm (PLEFTULNARSTYLOID)
    Marker pLeftRadialStyloid: LeftForeArm (PLEFTRADIALSTYLOID)
    Marker pLeftOlecranon: LeftForeArm (PLEFTOLECRANON)
    Marker pLeftTopOfHand: LeftHand (PLEFTTOPOFHAND)
    Marker pLeftPinky: LeftHand (PLEFTPINKY)
    Marker pLeftBallHand: LeftHand (PLEFTBALLHAND)
    Marker pRightGreaterTrochanter: RightUpperLeg (PRIGHTGREATERTROCHANTER)
    Marker pRightPatella: RightUpperLeg (PRIGHTPATELLA)
    Marker pRightKneeLatEpicondyle: RightLowerLeg (PRIGHTKNEELATEPICONDYLE)
    Marker pRightKneeMedEpicondyle: RightLowerLeg (PRIGHTKNEEMEDEPICONDYLE)
    Marker pRightLatMalleolus: RightLowerLeg (PRIGHTLATMALLEOLUS)
    Marker pRightMedMalleolus: RightLowerLeg (PRIGHTMEDMALLEOLUS)
    Marker pRightTibialTub: RightLowerLeg (PRIGHTTIBIALTUB)
    Marker pRightHeelFoot: RightFoot (PRIGHTHEELFOOT)
    Marker pRightFirstMetatarsal: RightFoot (PRIGHTFIRSTMETATARSAL)
    Marker pRightFifthMetatarsal: RightFoot (PRIGHTFIFTHMETATARSAL)
    Marker pRightPivotFoot: RightFoot (PRIGHTPIVOTFOOT)
    Marker pRightHeelCenter: RightFoot (PRIGHTHEELCENTER)
    Marker pRightToe: RightToe (PRIGHTTOE)
    Marker pLeftGreaterTrochanter: LeftUpperLeg (PLEFTGREATERTROCHANTER)
    Marker pLeftPatella: LeftUpperLeg (PLEFTPATELLA)
    Marker pLeftKneeLatEpicondyle: LeftLowerLeg (PLEFTKNEELATEPICONDYLE)
    Marker pLeftKneeMedEpicondyle: LeftLowerLeg (PLEFTKNEEMEDEPICONDYLE)
    Marker pLeftLatMalleolus: LeftLowerLeg (PLEFTLATMALLEOLUS)
    Marker pLeftMedMalleolus: LeftLowerLeg (PLEFTMEDMALLEOLUS)
    Marker pLeftTibialTub: LeftLowerLeg (PLEFTTIBIALTUB)
    Marker pLeftHeelFoot: LeftFoot (PLEFTHEELFOOT)
    Marker pLeftFirstMetatarsal: LeftFoot (PLEFTFIRSTMETATARSAL)
    Marker pLeftFifthMetatarsal: LeftFoot (PLEFTFIFTHMETATARSAL)
    Marker pLeftPivotFoot: LeftFoot (PLEFTPIVOTFOOT)
    Marker pLeftHeelCenter: LeftFoot (PLEFTHEELCENTER)
    Marker pLeftToe: LeftToe (PLEFTTOE)
