# OpenSim document version 30000
Model XSensStyleModel:
  length_units: meters
  force_units: N
  gravity: 0 0 -9.80665
  BodySet:
    Body Ground: mass=0 mass_center=0 inertia_xx=0 inertia_yy=0 inertia_zz=0
    Body Pelvis: mass=PELVISMASS mass_center=PELVIS_COM_ORIGIN inertia_xx=PELVISINERTIAIXX inertia_yy=PELVISINERTIAIYY
        inertia_zz=PELVISINERTIAIZZ meshes=box.vtp
      CustomJoint jGroundBase: parent_body=ground location_in_parent=(0 0 0) location=(0 0 0)
        Coordinate jGroundBase_rx: motion_type=rotational default_value=0 initial_value=0 range=(-3.1416 3.1416)
            clamped=true
        Coordinate jGroundBase_ry: motion_type=rotational default_value=0 initial_value=0 range=(-3.1416 3.1416)
            clamped=true
        Coordinate jGroundBase_rz: motion_type=rotational default_value=0 initial_value=0 range=(-3.1416 3.1416)
            clamped=true
        Coordinate jGroundBase_tx: motion_type=translational default_value=0 initial_value=0 range=(-Inf Inf)
            clamped=true
        Coordinate jGroundBase_ty: motion_type=translational default_value=0 initial_value=0 range=(-Inf Inf)
            clamped=true
        Coordinate jGroundBase_tz: motion_type=translational default_value=0 initial_value=0 range=(-Inf Inf)
            clamped=true
        SpatialTransform:
          TransformAxis rotation_z: coordinates=jGroundBase_rz axis=(0 0 1) LinearFunction(coefficients=1 0)
          TransformAxis rotation_x: coordinates=jGroundBase_rx axis=(1 0 0) LinearFunction(coefficients=1 0)
          TransformAxis rotation_y: coordinates=jGroundBase_ry axis=(0 1 0) LinearFunction(coefficients=1 0)
          TransformAxis translation_x: coordinates=jGroundBase_tx axis=(1 0 0) LinearFunction(coefficients=1 0)
          TransformAxis translation_y: coordinates=jGroundBase_ty axis=(0 1 0) LinearFunction(coefficients=1 0)
          TransformAxis translation_z: coordinates=jGroundBase_tz axis=(0 0 1) LinearFunction(coefficients=1 0)
    Body L5: mass=L5MASS mass_center=L5_COM_ORIGIN inertia_xx=L5INERTIAIXX inertia_yy=L5INERTIAIYY
        inertia_zz=L5INERTIAIZZ meshes=cylinder.vtp
      BallJoint jL5S1: parent_body=Pelvis location_in_parent=jL5S1_ORIGIN location=(0 0 0)
        Coordinate jL5S1_angle1: motion_type=rotational default_value=0 range=(-1.570796 1.570796) clamped=false
        Coordinate jL5S1_angle2: motion_type=rotational default_value=0 range=(-1.570796 1.570796) clamped=false
        Coordinate jL5S1_angle3: motion_type=rotational default_value=0 range=(-1.570796 1.570796) clamped=false
    Body L3: mass=L3MASS mass_center=L3_COM_ORIGIN inertia_xx=L3INERTIAIXX inertia_yy=L3INERTIAIYY
        inertia_zz=L3INERTIAIZZ meshes=cylinder.vtp
      BallJoint jL4L3: parent_body=L5 location_in_parent=jL4L3_ORIGIN location=(0 0 0)
        Coordinate jL4L3_angle1: motion_type=rotational default_value=0 range=(-1.570796 1.570796) clamped=false
        Coordinate jL4L3_angle2: motion_type=rotational default_value=0 range=(-1.570796 1.570796) clamped=false
        Coordinate jL4L3_angle3: motion_type=rotational default_value=0 range=(-1.570796 1.570796) clamped=false
    Body T12: mass=T12MASS mass_center=T12_COM_ORIGIN inertia_xx=T12INERTIAIXX inertia_yy=T12INERTIAIYY
        inertia_zz=T12INERTIAIZZ meshes=cylinder.vtp
      BallJoint jL1T12: parent_body=L3 location_in_parent=jL1T12_ORIGIN location=(0 0 0)
        Coordinate jL1T12_angle1: motion_type=rotational default_value=0 range=(-1.570796 1.570796) clamped=false
        Coordinate jL1T12_angle2: motion_type=rotational default_value=0 range=(-1.570796 1.570796) clamped=false
        Coordinate jL1T12_angle3: motion_type=rotational default_value=0 range=(-1.570796 1.570796) clamped=false
    Body T8: mass=T8MASS mass_center=T8_COM_ORIGIN inertia_xx=T8INERTIAIXX inertia_yy=T8INERTIAIYY
        inertia_zz=T8INERTIAIZZ meshes=box.vtp
      BallJoint jT9T8: parent_body=T12 location_in_parent=jT9T8_ORIGIN location=(0 0 0)
        Coordinate jT9T8_angle1: motion_type=rotational default_value=0 range=(-1.570796 1.570796) clamped=false
        Coordinate jT9T8_angle2: motion_type=rotational default_value=0 range=(-1.570796 1.570796) clamped=false
        Coordinate jT9T8_angle3: motion_type=rotational default_value=0 range=(-1.570796 1.570796) clamped=false
    Body Neck: mass=NECKMASS mass_center=NECK_COM_ORIGIN inertia_xx=NECKINERTIAIXX inertia_yy=NECKINERTIAIYY
        inertia_zz=NECKINERTIAIZZ meshes=cylinder.vtp
      BallJoint jT1C7: parent_body=T8 location_in_parent=jT1C7_ORIGIN location=(0 0 0)
        Coordinate jT1C7_angle1: motion_type=rotational default_value=0 range=(-1.570796 1.570796) clamped=false
        Coordinate jT1C7_angle2: motion_type=rotational default_value=0 range=(-1.570796 1.570796) clamped=false
        Coordinate jT1C7_angle3: motion_type=rotational default_value=0 range=(-1.570796 1.570796) clamped=false
    Body Head: mass=HEADMASS mass_center=HEAD_COM_ORIGIN inertia_xx=HEADINERTIAIXX inertia_yy=HEADINERTIAIYY
        inertia_zz=HEADINERTIAIZZ meshes=sphere.vtp
      BallJoint jC1Head: parent_body=Neck location_in_parent=jC1Head_ORIGIN location=(0 0 0)
        Coordinate jC1Head_angle1: motion_type=rotational default_value=0 range=(-1.570796 1.570796) clamped=false
        Coordinate jC1Head_angle2: motion_type=rotational default_value=0 range=(-1.570796 1.570796) clamped=false
        Coordinate jC1Head_angle3: motion_type=rotational default_value=0 range=(-1.570796 1.570796) clamped=false
    Body RightShoulder: mass=RIGHTSHOULDERMASS mass_center=RIGHTSHOULDER_COM_ORIGIN inertia_xx=RIGHTSHOULDERINERTIAIXX
        inertia_yy=RIGHTSHOULDERINERTIAIYY inertia_zz=RIGHTSHOULDERINERTIAIZZ meshes=cylinder.vtp
      BallJoint jRightC7Shoulder: parent_body=T8 location_in_parent=jRightC7Shoulder_ORIGIN location=(0 0 0)
        Coordinate jRightC7Shoulder_angle1: motion_type=rotational default_value=0 range=(-1.570796 1.570796)
            clamped=false
        Coordinate jRightC7Shoulder_angle2: motion_type=rotational default_value=0 range=(-1.570796 1.570796)
            clamped=false
        Coordinate jRightC7Shoulder_angle3: motion_type=rotational default_value=0 range=(-1.570796 1.570796)
            clamped=false
    Body RightUpperArm: mass=RIGHTUPPERARMMASS mass_center=RIGHTUPPERARM_COM_ORIGIN inertia_xx=RIGHTUPPERARMINERTIAIXX
        inertia_yy=RIGHTUPPERARMINERTIAIYY inertia_zz=RIGHTUPPERARMINERTIAIZZ meshes=cylinder.vtp
      BallJoint jRightShoulder: parent_body=RightShoulder location_in_parent=jRightShoulder_ORIGIN location=(0 0 0)
        Coordinate jRightShoulder_angle1: motion_type=rotational default_value=0 range=(-1.570796 1.570796)
            clamped=false
        Coordinate jRightShoulder_angle2: motion_type=rotational default_value=0 range=(-1.570796 1.570796)
            clamped=false
        Coordinate jRightShoulder_angle3: motion_type=rotational default_value=0 range=(-1.570796 1.570796)
            clamped=false
    Body RightForeArm: mass=RIGHTFOREARMMASS mass_center=RIGHTFOREARM_COM_ORIGIN inertia_xx=RIGHTFOREARMINERTIAIXX
        inertia_yy=RIGHTFOREARMINERTIAIYY inertia_zz=RIGHTFOREARMINERTIAIZZ meshes=cylinder.vtp
      BallJoint jRightElbow: parent_body=RightUpperArm location_in_parent=jRightElbow_ORIGIN location=(0 0 0)
        Coordinate jRightElbow_angle1: motion_type=rotational default_value=0 range=(-1.570796 1.570796) clamped=false
        Coordinate jRightElbow_angle2: motion_type=rotational default_value=0 range=(-1.570796 1.570796) clamped=false
        Coordinate jRightElbow_angle3: motion_type=rotational default_value=0 range=(-1.570796 1.570796) clamped=false
    Body RightHand: mass=RIGHTHANDMASS mass_center=RIGHTHAND_COM_ORIGIN inertia_xx=RIGHTHANDINERTIAIXX
        inertia_yy=RIGHTHANDINERTIAIYY inertia_zz=RIGHTHANDINERTIAIZZ meshes=box.vtp
      BallJoint jRightWrist: parent_body=RightForeArm location_in_parent=jRightWrist_ORIGIN location=(0 0 0)
        Coordinate jRightWrist_angle1: motion_type=rotational default_value=0 range=(-1.570796 1.570796) clamped=false
        Coordinate jRightWrist_angle2: motion_type=rotational default_value=0 range=(-1.570796 1.570796) clamped=false
        Coordinate jRightWrist_angle2: motion_type=rotational default_value=0 range=(-1.570796 1.570796) clamped=false
    Body LeftShoulder: mass=LEFTSHOULDERMASS mass_center=LEFTSHOULDER_COM_ORIGIN inertia_xx=LEFTSHOULDERINERTIAIXX
        inertia_yy=LEFTSHOULDERINERTIAIYY inertia_zz=LEFTSHOULDERINERTIAIZZ meshes=cylinder.vtp
      BallJoint jLeftC7Shoulder: parent_body=T8 location_in_parent=jLeftC7Shoulder_ORIGIN location=(0 0 0)
        Coordinate jLeftC7Shoulder_angle1: motion_type=rotational default_value=0 range=(-1.570796 1.570796)
            clamped=false
        Coordinate jLeftC7Shoulder_angle2: motion_type=rotational default_value=0 range=(-1.570796 1.570796)
            clamped=false
        Coordinate jLeftC7Shoulder_angle3: motion_type=rotational default_value=0 range=(-1.570796 1.570796)
            clamped=false
    Body LeftUpperArm: mass=LEFTUPPERARMMASS mass_center=LEFTUPPERARM_COM_ORIGIN inertia_xx=LEFTUPPERARMINERTIAIXX
        inertia_yy=LEFTUPPERARMINERTIAIYY inertia_zz=LEFTUPPERARMINERTIAIZZ meshes=cylinder.vtp
      BallJoint jLeftShoulder: parent_body=LeftShoulder location_in_parent=jLeftShoulder_ORIGIN location=(0 0 0)
        Coordinate jLeftShoulder_angle1: motion_type=rotational default_value=0 range=(-1.570796 1.570796)
            clamped=false
        Coordinate jLeftShoulder_angle2: motion_type=rotational default_value=0 range=(-1.570796 1.570796)
            clamped=false
        Coordinate jLeftShoulder_angle3: motion_type=rotational default_value=0 range=(-1.570796 1.570796)
            clamped=false
    Body LeftForeArm: mass=LEFTFOREARMMASS mass_center=LEFTFOREARM_COM_ORIGIN inertia_xx=LEFTFOREARMINERTIAIXX
        inertia_yy=LEFTFOREARMINERTIAIYY inertia_zz=LEFTFOREARMINERTIAIZZ meshes=cylinder.vtp
      BallJoint jLeftElbow: parent_body=LeftUpperArm location_in_parent=jLeftElbow_ORIGIN location=(0 0 0)
        Coordinate jLeftElbow_angle1: motion_type=rotational default_value=0 range=(-1.570796 1.570796) clamped=false
        Coordinate jLeftElbow_angle2: motion_type=rotational default_value=0 range=(-1.570796 1.570796) clamped=false
        Coordinate jLeftElbow_angle3: motion_type=rotational default_value=0 range=(-1.570796 1.570796) clamped=false
    Body LeftHand: mass=LEFTHANDMASS mass_center=LEFTHAND_COM_ORIGIN inertia_xx=LEFTHANDINERTIAIXX
        inertia_yy=LEFTHANDINERTIAIYY inertia_zz=LEFTHANDINERTIAIZZ meshes=box.vtp
      BallJoint jLeftWrist: parent_body=LeftForeArm location_in_parent=jLeftWrist_ORIGIN location=(0 0 0)
        Coordinate jLeftWrist_angle1: motion_type=rotational default_value=0 range=(-1.570796 1.570796) clamped=false
        Coordinate jLeftWrist_angle2: motion_type=rotational default_value=0 range=(-1.570796 1.570796) clamped=false
        Coordinate jLeftWrist_angle3: motion_type=rotational default_value=0 range=(-1.570796 1.570796) clamped=false
    Body RightUpperLeg: mass=RIGHTUPPERLEGMASS mass_center=RIGHTUPPERLEG_COM_ORIGIN inertia_xx=RIGHTUPPERLEGINERTIAIXX
        inertia_yy=RIGHTUPPERLEGINERTIAIYY inertia_zz=RIGHTUPPERLEGINERTIAIZZ meshes=cylinder.vtp
      BallJoint jRightHip: parent_body=Pelvis location_in_parent=jRightHip_ORIGIN location=(0 0 0)
        Coordinate jRightHip_angle1: motion_type=rotational default_value=0 range=(-1.570796 1.570796) clamped=false
        Coordinate jRightHip_angle2: motion_type=rotational default_value=0 range=(-1.570796 1.570796) clamped=false
        Coordinate jRightHip_angle3: motion_type=rotational default_value=0 range=(-1.570796 1.570796) clamped=false
    Body RightLowerLeg: mass=RIGHTLOWERLEGMASS mass_center=RIGHTLOWERLEG_COM_ORIGIN inertia_xx=RIGHTLOWERLEGINERTIAIXX
        inertia_yy=RIGHTLOWERLEGINERTIAIYY inertia_zz=RIGHTLOWERLEGINERTIAIZZ meshes=cylinder.vtp
      BallJoint jRightKnee: parent_body=RightUpperLeg location_in_parent=jRightKnee_ORIGIN location=(0 0 0)
        Coordinate jRightKnee_angle1: motion_type=rotational default_value=0 range=(-1.570796 1.570796) clamped=false
        Coordinate jRightKnee_angle2: motion_type=rotational default_value=0 range=(-1.570796 1.570796) clamped=false
        Coordinate jRightKnee_angle3: motion_type=rotational default_value=0 range=(-1.570796 1.570796) clamped=false
    Body RightFoot: mass=RIGHTFOOTMASS mass_center=RIGHTFOOT_COM_ORIGIN inertia_xx=RIGHTFOOTINERTIAIXX
        inertia_yy=RIGHTFOOTINERTIAIYY inertia_zz=RIGHTFOOTINERTIAIZZ meshes=box.vtp
      BallJoint jRightAnkle: parent_body=RightLowerLeg location_in_parent=jRightAnkle_ORIGIN location=(0 0 0)
        Coordinate jRightAnkle_angle1: motion_type=rotational default_value=0 range=(-1.570796 1.570796) clamped=false
        Coordinate jRightAnkle_angle2: motion_type=rotational default_value=0 range=(-1.570796 1.570796) clamped=false
        Coordinate jRightAnkle_angle3: motion_type=rotational default_value=0 range=(-1.570796 1.570796) clamped=false
    Body RightToe: mass=RIGHTTOEMASS mass_center=RIGHTTOE_COM_ORIGIN inertia_xx=RIGHTTOEINERTIAIXX
        inertia_yy=RIGHTTOEINERTIAIYY inertia_zz=RIGHTTOEINERTIAIZZ meshes=box.vtp
      BallJoint jRightBallFoot: parent_body=RightFoot location_in_parent=jRightBallFoot_ORIGIN location=(0 0 0)
        Coordinate jRightBallFoot_angle1: motion_type=rotational default_value=0 range=(-1.570796 1.570796)
            clamped=false
        Coordinate jRightBallFoot_angle2: motion_type=rotational default_value=0 range=(-1.570796 1.570796)
            clamped=false
        Coordinate jRightBallFoot_angle3: motion_type=rotational default_value=0 range=(-1.570796 1.570796)
            clamped=false
    Body LeftUpperLeg: mass=LEFTUPPERLEGMASS mass_center=LEFTUPPERLEG_COM_ORIGIN inertia_xx=LEFTUPPERLEGINERTIAIXX
        inertia_yy=LEFTUPPERLEGINERTIAIYY inertia_zz=LEFTUPPERLEGINERTIAIZZ meshes=cylinder.vtp
      BallJoint jLeftHip: parent_body=Pelvis location_in_parent=jLeftHip_ORIGIN location=(0 0 0)
        Coordinate jLeftKnee_angle1: motion_type=rotational default_value=0 range=(-1.570796 1.570796) clamped=false
        Coordinate jLeftKnee_angle2: motion_type=rotational default_value=0 range=(-1.570796 1.570796) clamped=false
        Coordinate jLeftKnee_angle3: motion_type=rotational default_value=0 range=(-1.570796 1.570796) clamped=false
    Body LeftLowerLeg: mass=LEFTLOWERLEGMASS mass_center=LEFTLOWERLEG_COM_ORIGIN inertia_xx=LEFTLOWERLEGINERTIAIXX
        inertia_yy=LEFTLOWERLEGINERTIAIYY inertia_zz=LEFTLOWERLEGINERTIAIZZ meshes=cylinder.vtp
      BallJoint jLeftKnee: parent_body=LeftUpperLeg location_in_parent=jLeftKnee_ORIGIN location=(0 0 0)
        Coordinate jLeftKnee_angle1: motion_type=rotational default_value=0 range=(-1.570796 1.570796) clamped=false
        Coordinate jLeftKnee_angle2: motion_type=rotational default_value=0 range=(-1.570796 1.570796) clamped=false
        Coordinate jLeftKnee_angle3: motion_type=rotational default_value=0 range=(-1.570796 1.570796) clamped=false
    Body LeftFoot: mass=LEFTFOOTMASS mass_center=LEFTFOOT_COM_ORIGIN inertia_xx=LEFTFOOTINERTIAIXX
        inertia_yy=LEFTFOOTINERTIAIYY inertia_zz=LEFTFOOTINERTIAIZZ meshes=box.vtp
      BallJoint jLeftAnkle: parent_body=LeftLowerLeg location_in_parent=jLeftAnkle_ORIGIN location=(0 0 0)
        Coordinate jLeftAnkle_angle1: motion_type=rotational default_value=0 range=(-1.570796 1.570796) clamped=false
        Coordinate jLeftAnkle_angle2: motion_type=rotational default_value=0 range=(-1.570796 1.570796) clamped=false
        Coordinate jLeftAnkle_angle3: motion_type=rotational default_value=0 range=(-1.570796 1.570796) clamped=false
    Body LeftToe: mass=LEFTTOEMASS mass_center=LEFTTOE_COM_ORIGIN inertia_xx=LEFTTOEINERTIAIXX
        inertia_yy=LEFTTOEINERTIAIYY inertia_zz=LEFTTOEINERTIAIZZ meshes=box.vtp
      BallJoint jLeftBallFoot: parent_body=LeftFoot location_in_parent=jLeftBallFoot_ORIGIN location=(0 0 0)
        Coordinate jLeftBallFoot_angle1: motion_type=rotational default_value=0 range=(-1.570796 1.570796)
            clamped=false
        Coordinate jLeftBallFoot_angle2: motion_type=rotational default_value=0 range=(-1.570796 1.570796)
            clamped=false
        Coordinate jLeftBallFoot_angle3: motion_type=rotational default_value=0 range=(-1.570796 1.570796)
            clamped=false
  MarkerSet:
    Marker pHipOrigin: Pelvis (PHIPORIGINX PHIPORIGINY PHIPORIGINZ)
    Marker pRightASI: Pelvis (PRIGHTASIX PRIGHTASIY PRIGHTASIZ)
    Marker pLeftASI: Pelvis (PLEFTASIX PLEFTASIY PLEFTASIZ)
    Marker pRightCSI: Pelvis (PRIGHTCSIX PRIGHTCSIY PRIGHTCSIZ)
    Marker pLeftCSI: Pelvis (PLEFTCSIX PLEFTCSIY PLEFTCSIZ)
    Marker pRightIschialTub: Pelvis (PRIGHTISCHIALTUBX PRIGHTISCHIALTUBY PRIGHTISCHIALTUBZ)
    Marker pLeftIschialTub: Pelvis (PLEFTISCHIALTUBX PLEFTISCHIALTUBY PLEFTISCHIALTUBZ)
    Marker pSacrum: Pelvis (PSACRUMX PSACRUMY PSACRUMZ)
    Marker pL5SpinalProcess: L5 (PL5SPINALPROCESSX PL5SPINALPROCESSY PL5SPINALPROCESSZ)
    Marker pL3SpinalProcess: L3 (PL3SPINALPROCESSX PL3SPINALPROCESSY PL3SPINALPROCESSZ)
    Marker pT12SpinalProcess: T12 (PT12SPINALPROCESSX PT12SPINALPROCESSY PT12SPINALPROCESSZ)
    Marker pC7SpinalProcess: T8 (PC7SPINALPROCESSX PC7SPINALPROCESSY PC7SPINALPROCESSZ)
    Marker pPX: T8 (PPXX PPXY PPXZ)
    Marker pIJ: T8 (PIJX PIJY PIJZ)
    Marker pT4SpinalProcess: T8 (PT4SPINALPROCESSX PT4SPINALPROCESSY PT4SPINALPROCESSZ)
    Marker pT8SpinalProcess: T8 (PT8SPINALPROCESSX PT8SPINALPROCESSY PT8SPINALPROCESSZ)
    Marker pTopOfHead: Head (PTOPOFHEADX PTOPOFHEADY PTOPOFHEADZ)
    Marker pRightAuricularis: Head (PRIGHTAURICULARISX PRIGHTAURICULARISY PRIGHTAURICULARISZ)
    Marker pLeftAuricularis: Head (PLEFTAURICULARISX PLEFTAURICULARISY PLEFTAURICULARISZ)
    Marker pBackOfHead: Head (PBACKOFHEADX PBACKOFHEADY PBACKOFHEADZ)
    Marker pRightAcromion: RightShoulder (PRIGHTACROMIONX PRIGHTACROMIONY PRIGHTACROMIONZ)
    Marker pLeftAcromion: LeftShoulder (PLEFTACROMIONX PLEFTACROMIONY PLEFTACROMIONZ)
    Marker pRightArmLatEpicondyle: RightUpperArm
        (PRIGHTARMLATEPICONDYLEX PRIGHTARMLATEPICONDYLEY PRIGHTARMLATEPICONDYLEZ)
    Marker pRightArmMedEpicondyle: RightUpperArm
        (PRIGHTARMMEDEPICONDYLEX PRIGHTARMMEDEPICONDYLEY PRIGHTARMMEDEPICONDYLEZ)
    Marker pLeftArmLatEpicondyle: LeftUpperArm (PLEFTARMLATEPICONDYLEX PLEFTARMLATEPICONDYLEY PLEFTARMLATEPICONDYLEZ)
    Marker pLeftArmMedEpicondyle: LeftUpperArm (PLEFTARMMEDEPICONDYLEX PLEFTARMMEDEPICONDYLEY PLEFTARMMEDEPICONDYLEZ)
    Marker pRightUlnarStyloid: RightForeArm (PRIGHTULNARSTYLOIDX PRIGHTULNARSTYLOIDY PRIGHTULNARSTYLOIDZ)
    Marker pRightRadialStyloid: RightForeArm (PRIGHTRADIALSTYLOIDX PRIGHTRADIALSTYLOIDY PRIGHTRADIALSTYLOIDZ)
    Marker pRightOlecranon: RightForeArm (PRIGHTOLECRANONX PRIGHTOLECRANONY PRIGHTOLECRANONZ)
    Marker pLeftUlnarStyloid: LeftForeArm (PLEFTULNARSTYLOIDX PLEFTULNARSTYLOIDY PLEFTULNARSTYLOIDZ)
    Marker pLeftRadialStyloid: LeftForeArm (PLEFTRADIALSTYLOIDX PLEFTRADIALSTYLOIDY PLEFTRADIALSTYLOIDZ)
    Marker pLeftOlecranon: LeftForeArm (PLEFTOLECRANONX PLEFTOLECRANONY PLEFTOLECRANONZ)
    Marker pRightTopOfHand: RightHand (PRIGHTTOPOFHANDX PRIGHTTOPOFHANDY PRIGHTTOPOFHANDZ)
    Marker pRightPinky: RightHand (PRIGHTPINKYX PRIGHTPINKYY PRIGHTPINKYZ)
    Marker pRightBallHand: RightHand (PRIGHTBALLHANDX PRIGHTBALLHANDY PRIGHTBALLHANDZ)
    Marker pLeftTopOfHand: LeftHand (PLEFTTOPOFHANDX PLEFTTOPOFHANDY PLEFTTOPOFHANDZ)
    Marker pLeftPinky: LeftHand (PLEFTPINKYX PLEFTPINKYY PLEFTPINKYZ)
    Marker pLeftBallHand: LeftHand (PLEFTBALLHANDX PLEFTBALLHANDY PLEFTBALLHANDZ)
    Marker pRightGreaterTrochanter: RightUpperLeg
        (PRIGHTGREATERTROCHANTERX PRIGHTGREATERTROCHANTERY PRIGHTGREATERTROCHANTERZ)
    Marker pRightPatella: RightUpperLeg (PRIGHTPATELLAX PRIGHTPATELLAY PRIGHTPATELLAZ)
    Marker pRightKneeLatEpicondyle: RightLowerLeg
        (PRIGHTKNEELATEPICONDYLEX PRIGHTKNEELATEPICONDYLEY PRIGHTKNEELATEPICONDYLEZ)
    Marker pRightKneeMedEpicondyle: RightLowerLeg
        (PRIGHTKNEEMEDEPICONDYLEX PRIGHTKNEEMEDEPICONDYLEY PRIGHTKNEEMEDEPICONDYLEZ)
    Marker pRightLatMalleolus: RightLowerLeg (PRIGHTLATMALLEOLUSX PRIGHTLATMALLEOLUSY PRIGHTLATMALLEOLUSZ)
    Marker pRightMedMalleolus: RightLowerLeg (PRIGHTMEDMALLEOLUSX PRIGHTMEDMALLEOLUSY PRIGHTMEDMALLEOLUSZ)
    Marker pRightTibialTub: RightLowerLeg (PRIGHTTIBIALTUBX PRIGHTTIBIALTUBY PRIGHTTIBIALTUBZ)
    Marker pLeftGreaterTrochanter: LeftUpperLeg
        (PLEFTGREATERTROCHANTERX PLEFTGREATERTROCHANTERY PLEFTGREATERTROCHANTERZ)
    Marker pLeftPatella: LeftUpperLeg (PLEFTPATELLAX PLEFTPATELLAY PLEFTPATELLAZ)
    Marker pLeftKneeLatEpicondyle: LeftLowerLeg
        (PLEFTKNEELATEPICONDYLEX PLEFTKNEELATEPICONDYLEY PLEFTKNEELATEPICONDYLEZ)
    Marker pLeftKneeMedEpicondyle: LeftLowerLeg
        (PLEFTKNEEMEDEPICONDYLEX PLEFTKNEEMEDEPICONDYLEY PLEFTKNEEMEDEPICONDYLEZ)
    Marker pLeftLatMalleolus: LeftLowerLeg (PLEFTLATMALLEOLUSX PLEFTLATMALLEOLUSY PLEFTLATMALLEOLUSZ)
    Marker pLeftMedMalleolus: LeftLowerLeg (PLEFTMEDMALLEOLUSX PLEFTMEDMALLEOLUSY PLEFTMEDMALLEOLUSZ)
    Marker pLeftTibialTub: LeftLowerLeg (PLEFTTIBIALTUBX PLEFTTIBIALTUBY PLEFTTIBIALTUBZ)
    Marker pRightHeelFoot: RightFoot (PRIGHTHEELFOOTX PRIGHTHEELFOOTY PRIGHTHEELFOOTZ)
    Marker pRightFirstMetatarsal: RightFoot (PRIGHTFIRSTMETATARSALX PRIGHTFIRSTMETATARSALY PRIGHTFIRSTMETATARSALZ)
    Marker pRightFifthMetatarsal: RightFoot (PRIGHTFIFTHMETATARSALX PRIGHTFIFTHMETATARSALY PRIGHTFIFTHMETATARSALZ)
    Marker pRightPivotFoot: RightFoot (PRIGHTPIVOTFOOTX PRIGHTPIVOTFOOTY PRIGHTPIVOTFOOTZ)
    Marker pRightHeelCenter: RightFoot (PRIGHTHEELCENTERX PRIGHTHEELCENTERY PRIGHTHEELCENTERZ)
    Marker pRightToe: RightToe (PRIGHTTOEX PRIGHTTOEY PRIGHTTOEZ)
    Marker pLeftHeelFoot: LeftFoot (PLEFTHEELFOOTX PLEFTHEELFOOTY PLEFTHEELFOOTZ)
    Marker pLeftFirstMetatarsal: LeftFoot (PLEFTFIRSTMETATARSALX PLEFTFIRSTMETATARSALY PLEFTFIRSTMETATARSALZ)
    Marker pLeftFifthMetatarsal: LeftFoot (PLEFTFIFTHMETATARSALX PLEFTFIFTHMETATARSALY PLEFTFIFTHMETATARSALZ)
    Marker pLeftPivotFoot: LeftFoot (PLEFTPIVOTFOOTX PLEFTPIVOTFOOTY PLEFTPIVOTFOOTZ)
    Marker pLeftHeelCenter: LeftFoot (PLEFTHEELCENTERX PLEFTHEELCENTERY PLEFTHEELCENTERZ)
    Marker pLeftToe: LeftToe (PLEFTTOEX PLEFTTOEY PLEFTTOEZ)
